// $id$
//	Copyright (C) 2008 Battelle Memorial Institute

// 4 Node Feeder: Unbalanced step-down grY-grY

////////////////////////////////////////////////////////
// BEGIN
////////////////////////////////////////////////////////

clock {
	timestamp '1999-12-28 0:00:00';
//	stoptime '2000-01-02 0:00:00';
	timezone EST+5EDT;
}

//#set threadcount=1
module tape;

module climate;
module residential {
	implicit_enduses NONE;
};

object csv_reader{
	name CsvReader;
	filename weather.csv;
};

object climate{
	name MyClimate;
	tmyfile weather.csv;
	reader CsvReader;
	object recorder {
		file climate_out.csv;
		interval 3600;
		limit 120;
		property temperature,humidity;
	};
};

// House 2
object house {
     name house_2;

     air_temperature 60;//random.uniform(50,100);  // Uniform distribution from 50 to 100
     mass_temperature 60;

     aspect_ratio 1.5;
     floor_area 2000.00 sf;
     ceiling_height 8.0;
     Rroof 50;
     Rwall 20;
     Rfloor 30;
     Rwindows 3;
     Rdoors 2;

     heating_system_type RESISTANCE;
     cooling_system_type NONE;
     fan_type ONE_SPEED;

     thermostat_deadband 2 degF;
     air_heat_fraction 0;
     mass_heat_coeff 1000;
     mass_heat_capacity 5000;
     window_shading 0.2;

     object recorder {
          	file house2_out.csv;
          	interval 60;
          	limit 2790;
          	property outdoor_temperature,air_temperature,mass_temperature,system_mode,heating_setpoint;
     };
}
