// $Id$
// automatically generated Fri May  1 13:10:34 PDT 2009 from 27502.tm2
module climate;
class climate {
	double elevation[m];
	double tzoffset[h];
}
object climate {
	city "Barrow AK";
	tmyfile "AK-Barrow.tmy2";
	tzoffset -9;
	elevation 4;
}
