// $Id$
// automatically generated Fri May  1 13:10:34 PDT 2009 from 26615.tm2
module climate;
class climate {
	double elevation[m];
	double tzoffset[h];
}
object climate {
	city "Bethel AK";
	tmyfile "AK-Bethel.tmy2";
	tzoffset -9;
	elevation 46;
}
