// $Id$
// automatically generated Fri May  1 13:10:34 PDT 2009 from 26415.tm2
module climate;
class climate {
	double elevation[m];
	double tzoffset[h];
}
object climate {
	city "Big_delta AK";
	tmyfile "AK-Big_delta.tmy2";
	tzoffset -9;
	elevation 388;
}
