// $Id$
// automatically generated Fri May  1 13:10:34 PDT 2009 from 25624.tm2
module climate;
class climate {
	double elevation[m];
	double tzoffset[h];
}
object climate {
	city "Cold_bay AK";
	tmyfile "AK-Cold_bay.tmy2";
	tzoffset -9;
	elevation 29;
}
