// $Id$
// automatically generated Fri May  1 13:10:34 PDT 2009 from 25503.tm2
module climate;
class climate {
	double elevation[m];
	double tzoffset[h];
}
object climate {
	city "King_salmon AK";
	tmyfile "AK-King_salmon.tmy2";
	tzoffset -9;
	elevation 15;
}
