// $Id$
// automatically generated Fri May  1 13:10:34 PDT 2009 from 25501.tm2
module climate;
class climate {
	double elevation[m];
	double tzoffset[h];
}
object climate {
	city "Kodiak AK";
	tmyfile "AK-Kodiak.tmy2";
	tzoffset -9;
	elevation 34;
}
