// $Id$
// automatically generated Fri May  1 13:10:34 PDT 2009 from 26616.tm2
module climate;
class climate {
	double elevation[m];
	double tzoffset[h];
}
object climate {
	city "Kotzebue AK";
	tmyfile "AK-Kotzebue.tmy2";
	tzoffset -9;
	elevation 5;
}
