// $Id$
// automatically generated Fri May  1 13:10:34 PDT 2009 from 26510.tm2
module climate;
class climate {
	double elevation[m];
	double tzoffset[h];
}
object climate {
	city "Mcgrath AK";
	tmyfile "AK-Mcgrath.tmy2";
	tzoffset -9;
	elevation 103;
}
