# $
# automatically generated by /bin/sh
module climate;
class climate {
	double elevation[m];
	double tzoffset[h];
}
object climate {
	city "Nome AK";
	tmyfile "AK-Nome.tmy2";
	tzoffset -9;
	elevation 7;
}
