// $Id$
// automatically generated Fri May  1 13:10:34 PDT 2009 from 25713.tm2
module climate;
class climate {
	double elevation[m];
	double tzoffset[h];
}
object climate {
	city "St_paul_is. AK";
	tmyfile "AK-St_paul_is..tmy2";
	tzoffset -10;
	elevation 7;
}
