// $Id$
// automatically generated Fri May  1 13:10:34 PDT 2009 from 25339.tm2
module climate;
class climate {
	double elevation[m];
	double tzoffset[h];
}
object climate {
	city "Yakutat AK";
	tmyfile "AK-Yakutat.tmy2";
	tzoffset -9;
	elevation 9;
}
