// $Id$
// automatically generated Fri May  1 13:10:28 PDT 2009 from 13876.tm2
module climate;
class climate {
	double elevation[m];
	double tzoffset[h];
}
object climate {
	city "Birmingham AL";
	tmyfile "AL-Birmingham.tmy2";
	tzoffset -6;
	elevation 192;
}
