// $Id$
// automatically generated Fri May  1 13:10:29 PDT 2009 from 13964.tm2
module climate;
class climate {
	double elevation[m];
	double tzoffset[h];
}
object climate {
	city "Fort_smith AR";
	tmyfile "AR-Fort_smith.tmy2";
	tzoffset -6;
	elevation 141;
}
