// $Id$
// automatically generated Fri May  1 13:10:27 PDT 2009 from 03103.tm2
module climate;
class climate {
	double elevation[m];
	double tzoffset[h];
}
object climate {
	city "Flagstaff AZ";
	tmyfile "AZ-Flagstaff.tmy2";
	tzoffset -7;
	elevation 2135;
}
