// $Id$
// automatically generated Fri May  1 13:10:35 PDT 2009 from 93193.tm2
module climate;
class climate {
	double elevation[m];
	double tzoffset[h];
}
object climate {
	city "Fresno CA";
	tmyfile "CA-Fresno.tmy2";
	tzoffset -8;
	elevation 100;
}
