// $Id$
// automatically generated Fri May  1 13:10:32 PDT 2009 from 23129.tm2
module climate;
class climate {
	double elevation[m];
	double tzoffset[h];
}
object climate {
	city "Long_beach CA";
	tmyfile "CA-Long_beach.tmy2";
	tzoffset -8;
	elevation 17;
}
