// $Id$
// automatically generated Fri May  1 13:10:32 PDT 2009 from 23174.tm2
module climate;
class climate {
	double elevation[m];
	double tzoffset[h];
}
object climate {
	city "Los_angeles CA";
	tmyfile "CA-Los_angeles.tmy2";
	tzoffset -8;
	elevation 32;
}
