// $Id$
// automatically generated Fri May  1 13:10:32 PDT 2009 from 23188.tm2
module climate;
class climate {
	double elevation[m];
	double tzoffset[h];
}
object climate {
	city "San_diego CA";
	tmyfile "CA-San_diego.tmy2";
	tzoffset -8;
	elevation 9;
}
