// $Id$
// automatically generated Fri May  1 13:10:32 PDT 2009 from 23234.tm2
module climate;
class climate {
	double elevation[m];
	double tzoffset[h];
}
object climate {
	city "San_francisco CA";
	tmyfile "CA-San_francisco.tmy2";
	tzoffset -8;
	elevation 5;
}
