// $Id$
// automatically generated Fri May  1 13:10:32 PDT 2009 from 23061.tm2
module climate;
class climate {
	double elevation[m];
	double tzoffset[h];
}
object climate {
	city "Alamosa CO";
	tmyfile "CO-Alamosa.tmy2";
	tzoffset -7;
	elevation 2297;
}
