// $Id$
// automatically generated Fri May  1 13:10:35 PDT 2009 from 94018.tm2
module climate;
class climate {
	double elevation[m];
	double tzoffset[h];
}
object climate {
	city "Boulder CO";
	tmyfile "CO-Boulder.tmy2";
	tzoffset -7;
	elevation 1634;
}
