// $Id$
// automatically generated Fri May  1 13:10:34 PDT 2009 from 93037.tm2
module climate;
class climate {
	double elevation[m];
	double tzoffset[h];
}
object climate {
	city "Colorado_springs CO";
	tmyfile "CO-Colorado_springs.tmy2";
	tzoffset -7;
	elevation 1881;
}
