// $Id$
// automatically generated Fri May  1 13:10:35 PDT 2009 from 93058.tm2
module climate;
class climate {
	double elevation[m];
	double tzoffset[h];
}
object climate {
	city "Pueblo CO";
	tmyfile "CO-Pueblo.tmy2";
	tzoffset -7;
	elevation 1439;
}
