// $Id$
// automatically generated Fri May  1 13:10:27 PDT 2009 from 12834.tm2
module climate;
class climate {
	double elevation[m];
	double tzoffset[h];
}
object climate {
	city "Daytona_beach FL";
	tmyfile "FL-Daytona_beach.tmy2";
	tzoffset -5;
	elevation 12;
}
