// $Id$
// automatically generated Fri May  1 13:10:29 PDT 2009 from 13889.tm2
module climate;
class climate {
	double elevation[m];
	double tzoffset[h];
}
object climate {
	city "Jacksonville FL";
	tmyfile "FL-Jacksonville.tmy2";
	tzoffset -5;
	elevation 9;
}
