// $Id$
// automatically generated Fri May  1 13:10:27 PDT 2009 from 12836.tm2
module climate;
class climate {
	double elevation[m];
	double tzoffset[h];
}
object climate {
	city "Key_west FL";
	tmyfile "FL-Key_west.tmy2";
	tzoffset -5;
	elevation 1;
}
