// $Id$
// automatically generated Fri May  1 13:10:35 PDT 2009 from 93805.tm2
module climate;
class climate {
	double elevation[m];
	double tzoffset[h];
}
object climate {
	city "Tallahassee FL";
	tmyfile "FL-Tallahassee.tmy2";
	tzoffset -5;
	elevation 21;
}
