// $Id$
// automatically generated Fri May  1 13:10:27 PDT 2009 from 12844.tm2
module climate;
class climate {
	double elevation[m];
	double tzoffset[h];
}
object climate {
	city "West_palm_beach FL";
	tmyfile "FL-West_palm_beach.tmy2";
	tzoffset -5;
	elevation 6;
}
