// $Id$
// automatically generated Fri May  1 13:10:27 PDT 2009 from 03820.tm2
module climate;
class climate {
	double elevation[m];
	double tzoffset[h];
}
object climate {
	city "Augusta GA";
	tmyfile "GA-Augusta.tmy2";
	tzoffset -5;
	elevation 45;
}
