// $Id$
// automatically generated Fri May  1 13:10:31 PDT 2009 from 22521.tm2
module climate;
class climate {
	double elevation[m];
	double tzoffset[h];
}
object climate {
	city "Honolulu HI";
	tmyfile "HI-Honolulu.tmy2";
	tzoffset -10;
	elevation 5;
}
