// $Id$
// automatically generated Fri May  1 13:10:31 PDT 2009 from 22516.tm2
module climate;
class climate {
	double elevation[m];
	double tzoffset[h];
}
object climate {
	city "Kahului HI";
	tmyfile "HI-Kahului.tmy2";
	tzoffset -10;
	elevation 15;
}
