// $Id$
// automatically generated Fri May  1 13:10:31 PDT 2009 from 22536.tm2
module climate;
class climate {
	double elevation[m];
	double tzoffset[h];
}
object climate {
	city "Lihue HI";
	tmyfile "HI-Lihue.tmy2";
	tzoffset -10;
	elevation 45;
}
