// $Id$
// automatically generated Fri May  1 13:10:31 PDT 2009 from 14933.tm2
module climate;
class climate {
	double elevation[m];
	double tzoffset[h];
}
object climate {
	city "Des_moines IA";
	tmyfile "IA-Des_moines.tmy2";
	tzoffset -6;
	elevation 294;
}
