// $Id$
// automatically generated Fri May  1 13:10:33 PDT 2009 from 24156.tm2
module climate;
class climate {
	double elevation[m];
	double tzoffset[h];
}
object climate {
	city "Pocatello ID";
	tmyfile "ID-Pocatello.tmy2";
	tzoffset -7;
	elevation 1365;
}
