// $Id$
// automatically generated Fri May  1 13:10:36 PDT 2009 from 94846.tm2
module climate;
class climate {
	double elevation[m];
	double tzoffset[h];
}
object climate {
	city "Chicago IL";
	tmyfile "IL-Chicago.tmy2";
	tzoffset -6;
	elevation 190;
}
