// $Id$
// automatically generated Fri May  1 13:10:31 PDT 2009 from 14923.tm2
module climate;
class climate {
	double elevation[m];
	double tzoffset[h];
}
object climate {
	city "Moline IL";
	tmyfile "IL-Moline.tmy2";
	tzoffset -6;
	elevation 181;
}
