// $Id$
// automatically generated Fri May  1 13:10:30 PDT 2009 from 14842.tm2
module climate;
class climate {
	double elevation[m];
	double tzoffset[h];
}
object climate {
	city "Peoria IL";
	tmyfile "IL-Peoria.tmy2";
	tzoffset -6;
	elevation 199;
}
