// $Id$
// automatically generated Fri May  1 13:10:36 PDT 2009 from 94822.tm2
module climate;
class climate {
	double elevation[m];
	double tzoffset[h];
}
object climate {
	city "Rockford IL";
	tmyfile "IL-Rockford.tmy2";
	tzoffset -6;
	elevation 221;
}
