// $Id$
// automatically generated Fri May  1 13:10:35 PDT 2009 from 93822.tm2
module climate;
class climate {
	double elevation[m];
	double tzoffset[h];
}
object climate {
	city "Springfield IL";
	tmyfile "IL-Springfield.tmy2";
	tzoffset -6;
	elevation 187;
}
