// $Id$
// automatically generated Fri May  1 13:10:35 PDT 2009 from 93817.tm2
module climate;
class climate {
	double elevation[m];
	double tzoffset[h];
}
object climate {
	city "Evansville IN";
	tmyfile "IN-Evansville.tmy2";
	tzoffset -6;
	elevation 118;
}
