// $Id$
// automatically generated Fri May  1 13:10:30 PDT 2009 from 14848.tm2
module climate;
class climate {
	double elevation[m];
	double tzoffset[h];
}
object climate {
	city "South_bend IN";
	tmyfile "IN-South_bend.tmy2";
	tzoffset -5;
	elevation 236;
}
