// $Id$
// automatically generated Fri May  1 13:10:32 PDT 2009 from 23065.tm2
module climate;
class climate {
	double elevation[m];
	double tzoffset[h];
}
object climate {
	city "Goodland KS";
	tmyfile "KS-Goodland.tmy2";
	tzoffset -7;
	elevation 1124;
}
