// $Id$
// automatically generated Fri May  1 13:10:27 PDT 2009 from 03928.tm2
module climate;
class climate {
	double elevation[m];
	double tzoffset[h];
}
object climate {
	city "Wichita KS";
	tmyfile "KS-Wichita.tmy2";
	tzoffset -6;
	elevation 408;
}
