// $Id$
// automatically generated Fri May  1 13:10:35 PDT 2009 from 93814.tm2
module climate;
class climate {
	double elevation[m];
	double tzoffset[h];
}
object climate {
	city "Covington KY";
	tmyfile "KY-Covington.tmy2";
	tzoffset -5;
	elevation 271;
}
