// $Id$
// automatically generated Fri May  1 13:10:35 PDT 2009 from 93821.tm2
module climate;
class climate {
	double elevation[m];
	double tzoffset[h];
}
object climate {
	city "Louisville KY";
	tmyfile "KY-Louisville.tmy2";
	tzoffset -5;
	elevation 149;
}
