// $Id$
// automatically generated Fri May  1 13:10:29 PDT 2009 from 13970.tm2
module climate;
class climate {
	double elevation[m];
	double tzoffset[h];
}
object climate {
	city "Baton_rouge LA";
	tmyfile "LA-Baton_rouge.tmy2";
	tzoffset -6;
	elevation 23;
}
