// $Id$
// automatically generated Fri May  1 13:10:27 PDT 2009 from 03937.tm2
module climate;
class climate {
	double elevation[m];
	double tzoffset[h];
}
object climate {
	city "Lake_charles LA";
	tmyfile "LA-Lake_charles.tmy2";
	tzoffset -6;
	elevation 3;
}
