// $Id$
// automatically generated Fri May  1 13:10:30 PDT 2009 from 14739.tm2
module climate;
class climate {
	double elevation[m];
	double tzoffset[h];
}
object climate {
	city "Boston MA";
	tmyfile "MA-Boston.tmy2";
	tzoffset -5;
	elevation 5;
}
