// $Id$
// automatically generated Fri May  1 13:10:35 PDT 2009 from 93721.tm2
module climate;
class climate {
	double elevation[m];
	double tzoffset[h];
}
object climate {
	city "Baltimore MD";
	tmyfile "MD-Baltimore.tmy2";
	tzoffset -5;
	elevation 47;
}
