// $Id$
// automatically generated Fri May  1 13:10:36 PDT 2009 from 94849.tm2
module climate;
class climate {
	double elevation[m];
	double tzoffset[h];
}
object climate {
	city "Alpena MI";
	tmyfile "MI-Alpena.tmy2";
	tzoffset -5;
	elevation 210;
}
