// $Id$
// automatically generated Fri May  1 13:10:36 PDT 2009 from 94847.tm2
module climate;
class climate {
	double elevation[m];
	double tzoffset[h];
}
object climate {
	city "Detroit MI";
	tmyfile "MI-Detroit.tmy2";
	tzoffset -5;
	elevation 191;
}
