// $Id$
// automatically generated Fri May  1 13:10:36 PDT 2009 from 94814.tm2
module climate;
class climate {
	double elevation[m];
	double tzoffset[h];
}
object climate {
	city "Houghton MI";
	tmyfile "MI-Houghton.tmy2";
	tzoffset -5;
	elevation 329;
}
