// $Id$
// automatically generated Fri May  1 13:10:30 PDT 2009 from 14847.tm2
module climate;
class climate {
	double elevation[m];
	double tzoffset[h];
}
object climate {
	city "Sault_ste._marie MI";
	tmyfile "MI-Sault_ste._marie.tmy2";
	tzoffset -5;
	elevation 221;
}
