// $Id$
// automatically generated Fri May  1 13:10:31 PDT 2009 from 14918.tm2
module climate;
class climate {
	double elevation[m];
	double tzoffset[h];
}
object climate {
	city "International_falls MN";
	tmyfile "MN-International_falls.tmy2";
	tzoffset -6;
	elevation 361;
}
