// $Id$
// automatically generated Fri May  1 13:10:31 PDT 2009 from 14926.tm2
module climate;
class climate {
	double elevation[m];
	double tzoffset[h];
}
object climate {
	city "Saint_cloud MN";
	tmyfile "MN-Saint_cloud.tmy2";
	tzoffset -6;
	elevation 313;
}
