// $Id$
// automatically generated Fri May  1 13:10:27 PDT 2009 from 03947.tm2
module climate;
class climate {
	double elevation[m];
	double tzoffset[h];
}
object climate {
	city "Kansas_city MO";
	tmyfile "MO-Kansas_city.tmy2";
	tzoffset -6;
	elevation 315;
}
