// $Id$
// automatically generated Fri May  1 13:10:29 PDT 2009 from 13994.tm2
module climate;
class climate {
	double elevation[m];
	double tzoffset[h];
}
object climate {
	city "St._louis MO";
	tmyfile "MO-St._louis.tmy2";
	tzoffset -6;
	elevation 172;
}
