// $Id$
// automatically generated Fri May  1 13:10:28 PDT 2009 from 13865.tm2
module climate;
class climate {
	double elevation[m];
	double tzoffset[h];
}
object climate {
	city "Meridian MS";
	tmyfile "MS-Meridian.tmy2";
	tzoffset -6;
	elevation 94;
}
