// $Id$
// automatically generated Fri May  1 13:10:33 PDT 2009 from 24137.tm2
module climate;
class climate {
	double elevation[m];
	double tzoffset[h];
}
object climate {
	city "Cut_bank MT";
	tmyfile "MT-Cut_bank.tmy2";
	tzoffset -7;
	elevation 1170;
}
