// $Id$
// automatically generated Fri May  1 13:10:35 PDT 2009 from 94008.tm2
module climate;
class climate {
	double elevation[m];
	double tzoffset[h];
}
object climate {
	city "Glasgow MT";
	tmyfile "MT-Glasgow.tmy2";
	tzoffset -7;
	elevation 700;
}
