// $Id$
// automatically generated Fri May  1 13:10:33 PDT 2009 from 24143.tm2
module climate;
class climate {
	double elevation[m];
	double tzoffset[h];
}
object climate {
	city "Great_falls MT";
	tmyfile "MT-Great_falls.tmy2";
	tzoffset -7;
	elevation 1116;
}
