// $Id$
// automatically generated Fri May  1 13:10:35 PDT 2009 from 93729.tm2
module climate;
class climate {
	double elevation[m];
	double tzoffset[h];
}
object climate {
	city "Cape_hatteras NC";
	tmyfile "NC-Cape_hatteras.tmy2";
	tzoffset -5;
	elevation 2;
}
