// $Id$
// automatically generated Fri May  1 13:10:28 PDT 2009 from 13881.tm2
module climate;
class climate {
	double elevation[m];
	double tzoffset[h];
}
object climate {
	city "Charlotte NC";
	tmyfile "NC-Charlotte.tmy2";
	tzoffset -5;
	elevation 234;
}
