// $Id$
// automatically generated Fri May  1 13:10:32 PDT 2009 from 24011.tm2
module climate;
class climate {
	double elevation[m];
	double tzoffset[h];
}
object climate {
	city "Bismarck ND";
	tmyfile "ND-Bismarck.tmy2";
	tzoffset -6;
	elevation 502;
}
