// $Id$
// automatically generated Fri May  1 13:10:31 PDT 2009 from 14914.tm2
module climate;
class climate {
	double elevation[m];
	double tzoffset[h];
}
object climate {
	city "Fargo ND";
	tmyfile "ND-Fargo.tmy2";
	tzoffset -6;
	elevation 274;
}
