// $Id$
// automatically generated Fri May  1 13:10:31 PDT 2009 from 14935.tm2
module climate;
class climate {
	double elevation[m];
	double tzoffset[h];
}
object climate {
	city "Grand_island NE";
	tmyfile "NE-Grand_island.tmy2";
	tzoffset -6;
	elevation 566;
}
