// $Id$
// automatically generated Fri May  1 13:10:36 PDT 2009 from 94918.tm2
module climate;
class climate {
	double elevation[m];
	double tzoffset[h];
}
object climate {
	city "Omaha NE";
	tmyfile "NE-Omaha.tmy2";
	tzoffset -6;
	elevation 404;
}
