// $Id$
// automatically generated Fri May  1 13:10:30 PDT 2009 from 14745.tm2
module climate;
class climate {
	double elevation[m];
	double tzoffset[h];
}
object climate {
	city "Concord NH";
	tmyfile "NH-Concord.tmy2";
	tzoffset -5;
	elevation 105;
}
