// $Id$
// automatically generated Fri May  1 13:10:35 PDT 2009 from 93730.tm2
module climate;
class climate {
	double elevation[m];
	double tzoffset[h];
}
object climate {
	city "Atlantic_city NJ";
	tmyfile "NJ-Atlantic_city.tmy2";
	tzoffset -5;
	elevation 20;
}
