// $Id$
// automatically generated Fri May  1 13:10:33 PDT 2009 from 24121.tm2
module climate;
class climate {
	double elevation[m];
	double tzoffset[h];
}
object climate {
	city "Elko NV";
	tmyfile "NV-Elko.tmy2";
	tzoffset -8;
	elevation 1547;
}
