// $Id$
// automatically generated Fri May  1 13:10:32 PDT 2009 from 23185.tm2
module climate;
class climate {
	double elevation[m];
	double tzoffset[h];
}
object climate {
	city "Reno NV";
	tmyfile "NV-Reno.tmy2";
	tzoffset -8;
	elevation 1341;
}
