// $Id$
// automatically generated Fri May  1 13:10:32 PDT 2009 from 23153.tm2
module climate;
class climate {
	double elevation[m];
	double tzoffset[h];
}
object climate {
	city "Tonopah NV";
	tmyfile "NV-Tonopah.tmy2";
	tzoffset -8;
	elevation 1653;
}
