// $Id$
// automatically generated Fri May  1 13:10:29 PDT 2009 from 14735.tm2
module climate;
class climate {
	double elevation[m];
	double tzoffset[h];
}
object climate {
	city "Albany NY";
	tmyfile "NY-Albany.tmy2";
	tzoffset -5;
	elevation 89;
}
