// $Id$
// automatically generated Fri May  1 13:10:29 PDT 2009 from 14733.tm2
module climate;
class climate {
	double elevation[m];
	double tzoffset[h];
}
object climate {
	city "Buffalo NY";
	tmyfile "NY-Buffalo.tmy2";
	tzoffset -5;
	elevation 215;
}
