// $Id$
// automatically generated Fri May  1 13:10:35 PDT 2009 from 94728.tm2
module climate;
class climate {
	double elevation[m];
	double tzoffset[h];
}
object climate {
	city "New_york_city NY";
	tmyfile "NY-New_york_city.tmy2";
	tzoffset -5;
	elevation 57;
}
