// $Id$
// automatically generated Fri May  1 13:10:30 PDT 2009 from 14768.tm2
module climate;
class climate {
	double elevation[m];
	double tzoffset[h];
}
object climate {
	city "Rochester NY";
	tmyfile "NY-Rochester.tmy2";
	tzoffset -5;
	elevation 169;
}
