// $Id$
// automatically generated Fri May  1 13:10:30 PDT 2009 from 14771.tm2
module climate;
class climate {
	double elevation[m];
	double tzoffset[h];
}
object climate {
	city "Syracuse NY";
	tmyfile "NY-Syracuse.tmy2";
	tzoffset -5;
	elevation 124;
}
