// $Id$
// automatically generated Fri May  1 13:10:31 PDT 2009 from 14895.tm2
module climate;
class climate {
	double elevation[m];
	double tzoffset[h];
}
object climate {
	city "Akron OH";
	tmyfile "OH-Akron.tmy2";
	tzoffset -5;
	elevation 377;
}
