// $Id$
// automatically generated Fri May  1 13:10:30 PDT 2009 from 14820.tm2
module climate;
class climate {
	double elevation[m];
	double tzoffset[h];
}
object climate {
	city "Cleveland OH";
	tmyfile "OH-Cleveland.tmy2";
	tzoffset -5;
	elevation 245;
}
