// $Id$
// automatically generated Fri May  1 13:10:30 PDT 2009 from 14821.tm2
module climate;
class climate {
	double elevation[m];
	double tzoffset[h];
}
object climate {
	city "Columbus OH";
	tmyfile "OH-Columbus.tmy2";
	tzoffset -5;
	elevation 254;
}
