// $Id$
// automatically generated Fri May  1 13:10:31 PDT 2009 from 14891.tm2
module climate;
class climate {
	double elevation[m];
	double tzoffset[h];
}
object climate {
	city "Mansfield OH";
	tmyfile "OH-Mansfield.tmy2";
	tzoffset -5;
	elevation 395;
}
