// $Id$
// automatically generated Fri May  1 13:10:36 PDT 2009 from 94830.tm2
module climate;
class climate {
	double elevation[m];
	double tzoffset[h];
}
object climate {
	city "Toledo OH";
	tmyfile "OH-Toledo.tmy2";
	tzoffset -5;
	elevation 211;
}
