// $Id$
// automatically generated Fri May  1 13:10:29 PDT 2009 from 13967.tm2
module climate;
class climate {
	double elevation[m];
	double tzoffset[h];
}
object climate {
	city "Oklahoma_city OK";
	tmyfile "OK-Oklahoma_city.tmy2";
	tzoffset -6;
	elevation 397;
}
