// $Id$
// automatically generated Fri May  1 13:10:35 PDT 2009 from 94224.tm2
module climate;
class climate {
	double elevation[m];
	double tzoffset[h];
}
object climate {
	city "Astoria OR";
	tmyfile "OR-Astoria.tmy2";
	tzoffset -8;
	elevation 7;
}
