// $Id$
// automatically generated Fri May  1 13:10:35 PDT 2009 from 94185.tm2
module climate;
class climate {
	double elevation[m];
	double tzoffset[h];
}
object climate {
	city "Burns OR";
	tmyfile "OR-Burns.tmy2";
	tzoffset -8;
	elevation 1271;
}
