// $Id$
// automatically generated Fri May  1 13:10:33 PDT 2009 from 24221.tm2
module climate;
class climate {
	double elevation[m];
	double tzoffset[h];
}
object climate {
	city "Eugene OR";
	tmyfile "OR-Eugene.tmy2";
	tzoffset -8;
	elevation 109;
}
