// $Id$
// automatically generated Fri May  1 13:10:33 PDT 2009 from 24225.tm2
module climate;
class climate {
	double elevation[m];
	double tzoffset[h];
}
object climate {
	city "Medford OR";
	tmyfile "OR-Medford.tmy2";
	tzoffset -8;
	elevation 396;
}
