// $Id$
// automatically generated Fri May  1 13:10:34 PDT 2009 from 24284.tm2
module climate;
class climate {
	double elevation[m];
	double tzoffset[h];
}
object climate {
	city "North_bend OR";
	tmyfile "OR-North_bend.tmy2";
	tzoffset -8;
	elevation 5;
}
