// $Id$
// automatically generated Fri May  1 13:10:33 PDT 2009 from 24155.tm2
module climate;
class climate {
	double elevation[m];
	double tzoffset[h];
}
object climate {
	city "Pendleton OR";
	tmyfile "OR-Pendleton.tmy2";
	tzoffset -8;
	elevation 456;
}
