// $Id$
// automatically generated Fri May  1 13:10:34 PDT 2009 from 24229.tm2
module climate;
class climate {
	double elevation[m];
	double tzoffset[h];
}
object climate {
	city "Portland OR";
	tmyfile "OR-Portland.tmy2";
	tzoffset -8;
	elevation 12;
}
