// $Id$
// automatically generated Fri May  1 13:10:34 PDT 2009 from 24230.tm2
module climate;
class climate {
	double elevation[m];
	double tzoffset[h];
}
object climate {
	city "Redmond OR";
	tmyfile "OR-Redmond.tmy2";
	tzoffset -8;
	elevation 940;
}
