// $Id$
// automatically generated Fri May  1 13:10:30 PDT 2009 from 14737.tm2
module climate;
class climate {
	double elevation[m];
	double tzoffset[h];
}
object climate {
	city "Allentown PA";
	tmyfile "PA-Allentown.tmy2";
	tzoffset -5;
	elevation 117;
}
