// $Id$
// automatically generated Fri May  1 13:10:30 PDT 2009 from 14751.tm2
module climate;
class climate {
	double elevation[m];
	double tzoffset[h];
}
object climate {
	city "Harrisburg PA";
	tmyfile "PA-Harrisburg.tmy2";
	tzoffset -5;
	elevation 106;
}
