// $Id$
// automatically generated Fri May  1 13:10:36 PDT 2009 from 94823.tm2
module climate;
class climate {
	double elevation[m];
	double tzoffset[h];
}
object climate {
	city "Pittsburgh PA";
	tmyfile "PA-Pittsburgh.tmy2";
	tzoffset -5;
	elevation 373;
}
