// $Id$
// automatically generated Fri May  1 13:10:30 PDT 2009 from 14778.tm2
module climate;
class climate {
	double elevation[m];
	double tzoffset[h];
}
object climate {
	city "Williamsport PA";
	tmyfile "PA-Williamsport.tmy2";
	tzoffset -5;
	elevation 243;
}
