// $Id$
// automatically generated Fri May  1 13:10:34 PDT 2009 from 41415.tm2
module climate;
class climate {
	double elevation[m];
	double tzoffset[h];
}
object climate {
	city "Guam PI";
	tmyfile "PI-Guam.tmy2";
	tzoffset 10;
	elevation 110;
}
