// $Id$
// automatically generated Fri May  1 13:10:27 PDT 2009 from 11641.tm2
module climate;
class climate {
	double elevation[m];
	double tzoffset[h];
}
object climate {
	city "San_juan PR";
	tmyfile "PR-San_juan.tmy2";
	tzoffset -4;
	elevation 19;
}
