// $Id$
// automatically generated Fri May  1 13:10:29 PDT 2009 from 13883.tm2
module climate;
class climate {
	double elevation[m];
	double tzoffset[h];
}
object climate {
	city "Columbia SC";
	tmyfile "SC-Columbia.tmy2";
	tzoffset -5;
	elevation 69;
}
