// $Id$
// automatically generated Fri May  1 13:10:33 PDT 2009 from 24025.tm2
module climate;
class climate {
	double elevation[m];
	double tzoffset[h];
}
object climate {
	city "Pierre SD";
	tmyfile "SD-Pierre.tmy2";
	tzoffset -6;
	elevation 526;
}
