// $Id$
// automatically generated Fri May  1 13:10:33 PDT 2009 from 24090.tm2
module climate;
class climate {
	double elevation[m];
	double tzoffset[h];
}
object climate {
	city "Rapid_city SD";
	tmyfile "SD-Rapid_city.tmy2";
	tzoffset -7;
	elevation 966;
}
