// $Id$
// automatically generated Fri May  1 13:10:28 PDT 2009 from 13877.tm2
module climate;
class climate {
	double elevation[m];
	double tzoffset[h];
}
object climate {
	city "Bristol TN";
	tmyfile "TN-Bristol.tmy2";
	tzoffset -5;
	elevation 459;
}
