// $Id$
// automatically generated Fri May  1 13:10:28 PDT 2009 from 13882.tm2
module climate;
class climate {
	double elevation[m];
	double tzoffset[h];
}
object climate {
	city "Chattanooga TN";
	tmyfile "TN-Chattanooga.tmy2";
	tzoffset -5;
	elevation 210;
}
