// $Id$
// automatically generated Fri May  1 13:10:29 PDT 2009 from 13893.tm2
module climate;
class climate {
	double elevation[m];
	double tzoffset[h];
}
object climate {
	city "Memphis TN";
	tmyfile "TN-Memphis.tmy2";
	tzoffset -6;
	elevation 87;
}
