// $Id$
// automatically generated Fri May  1 13:10:32 PDT 2009 from 23047.tm2
module climate;
class climate {
	double elevation[m];
	double tzoffset[h];
}
object climate {
	city "Amarillo TX";
	tmyfile "TX-Amarillo.tmy2";
	tzoffset -6;
	elevation 1098;
}
