// $Id$
// automatically generated Fri May  1 13:10:28 PDT 2009 from 12919.tm2
module climate;
class climate {
	double elevation[m];
	double tzoffset[h];
}
object climate {
	city "Brownsville TX";
	tmyfile "TX-Brownsville.tmy2";
	tzoffset -6;
	elevation 6;
}
