// $Id$
// automatically generated Fri May  1 13:10:28 PDT 2009 from 12924.tm2
module climate;
class climate {
	double elevation[m];
	double tzoffset[h];
}
object climate {
	city "Corpus_christi TX";
	tmyfile "TX-Corpus_christi.tmy2";
	tzoffset -6;
	elevation 13;
}
