// $Id$
// automatically generated Fri May  1 13:10:32 PDT 2009 from 23044.tm2
module climate;
class climate {
	double elevation[m];
	double tzoffset[h];
}
object climate {
	city "El_paso TX";
	tmyfile "TX-El_paso.tmy2";
	tzoffset -7;
	elevation 1194;
}
