// $Id$
// automatically generated Fri May  1 13:10:27 PDT 2009 from 03927.tm2
module climate;
class climate {
	double elevation[m];
	double tzoffset[h];
}
object climate {
	city "Fort_worth TX";
	tmyfile "TX-Fort_worth.tmy2";
	tzoffset -6;
	elevation 164;
}
