// $Id$
// automatically generated Fri May  1 13:10:28 PDT 2009 from 12960.tm2
module climate;
class climate {
	double elevation[m];
	double tzoffset[h];
}
object climate {
	city "Houston TX";
	tmyfile "TX-Houston.tmy2";
	tzoffset -6;
	elevation 33;
}
