// $Id$
// automatically generated Fri May  1 13:10:31 PDT 2009 from 23023.tm2
module climate;
class climate {
	double elevation[m];
	double tzoffset[h];
}
object climate {
	city "Midland TX";
	tmyfile "TX-Midland.tmy2";
	tzoffset -6;
	elevation 871;
}
