// $Id$
// automatically generated Fri May  1 13:10:27 PDT 2009 from 12917.tm2
module climate;
class climate {
	double elevation[m];
	double tzoffset[h];
}
object climate {
	city "Port_arthur TX";
	tmyfile "TX-Port_arthur.tmy2";
	tzoffset -6;
	elevation 7;
}
