// $Id$
// automatically generated Fri May  1 13:10:31 PDT 2009 from 23034.tm2
module climate;
class climate {
	double elevation[m];
	double tzoffset[h];
}
object climate {
	city "San_angelo TX";
	tmyfile "TX-San_angelo.tmy2";
	tzoffset -6;
	elevation 582;
}
