// $Id$
// automatically generated Fri May  1 13:10:28 PDT 2009 from 12921.tm2
module climate;
class climate {
	double elevation[m];
	double tzoffset[h];
}
object climate {
	city "San_antonio TX";
	tmyfile "TX-San_antonio.tmy2";
	tzoffset -6;
	elevation 242;
}
