// $Id$
// automatically generated Fri May  1 13:10:27 PDT 2009 from 12912.tm2
module climate;
class climate {
	double elevation[m];
	double tzoffset[h];
}
object climate {
	city "Victoria TX";
	tmyfile "TX-Victoria.tmy2";
	tzoffset -6;
	elevation 32;
}
