// $Id$
// automatically generated Fri May  1 13:10:35 PDT 2009 from 93129.tm2
module climate;
class climate {
	double elevation[m];
	double tzoffset[h];
}
object climate {
	city "Cedar_city UT";
	tmyfile "UT-Cedar_city.tmy2";
	tzoffset -7;
	elevation 1712;
}
