// $Id$
// automatically generated Fri May  1 13:10:33 PDT 2009 from 24127.tm2
module climate;
class climate {
	double elevation[m];
	double tzoffset[h];
}
object climate {
	city "Salt_lake_city UT";
	tmyfile "UT-Salt_lake_city.tmy2";
	tzoffset -7;
	elevation 1288;
}
