// $Id$
// automatically generated Fri May  1 13:10:28 PDT 2009 from 13741.tm2
module climate;
class climate {
	double elevation[m];
	double tzoffset[h];
}
object climate {
	city "Roanoke VA";
	tmyfile "VA-Roanoke.tmy2";
	tzoffset -5;
	elevation 358;
}
