// $Id$
// automatically generated Fri May  1 13:10:35 PDT 2009 from 93738.tm2
module climate;
class climate {
	double elevation[m];
	double tzoffset[h];
}
object climate {
	city "Sterling VA";
	tmyfile "VA-Sterling.tmy2";
	tzoffset -5;
	elevation 82;
}
