// $Id$
// automatically generated Fri May  1 13:10:35 PDT 2009 from 94240.tm2
module climate;
class climate {
	double elevation[m];
	double tzoffset[h];
}
object climate {
	city "Quillayute WA";
	tmyfile "WA-Quillayute.tmy2";
	tzoffset -8;
	elevation 55;
}
