// $Id$
// automatically generated Fri May  1 13:10:34 PDT 2009 from 24243.tm2
module climate;
class climate {
	double elevation[m];
	double tzoffset[h];
}
object climate {
	city "Yakima WA";
	tmyfile "WA-Yakima.tmy2";
	tzoffset -8;
	elevation 325;
}
