// $Id$
// automatically generated Fri May  1 13:10:31 PDT 2009 from 14991.tm2
module climate;
class climate {
	double elevation[m];
	double tzoffset[h];
}
object climate {
	city "Eau_claire WI";
	tmyfile "WI-Eau_claire.tmy2";
	tzoffset -6;
	elevation 273;
}
