// $Id$
// automatically generated Fri May  1 13:10:31 PDT 2009 from 14898.tm2
module climate;
class climate {
	double elevation[m];
	double tzoffset[h];
}
object climate {
	city "Green_bay WI";
	tmyfile "WI-Green_bay.tmy2";
	tzoffset -6;
	elevation 214;
}
