// $Id$
// automatically generated Fri May  1 13:10:31 PDT 2009 from 14920.tm2
module climate;
class climate {
	double elevation[m];
	double tzoffset[h];
}
object climate {
	city "La_crosse WI";
	tmyfile "WI-La_crosse.tmy2";
	tzoffset -6;
	elevation 205;
}
