// $Id$
// automatically generated Fri May  1 13:10:30 PDT 2009 from 14839.tm2
module climate;
class climate {
	double elevation[m];
	double tzoffset[h];
}
object climate {
	city "Milwaukee WI";
	tmyfile "WI-Milwaukee.tmy2";
	tzoffset -6;
	elevation 211;
}
