// $Id$
// automatically generated Fri May  1 13:10:28 PDT 2009 from 13866.tm2
module climate;
class climate {
	double elevation[m];
	double tzoffset[h];
}
object climate {
	city "Charleston WV";
	tmyfile "WV-Charleston.tmy2";
	tzoffset -5;
	elevation 290;
}
