// $Id$
// automatically generated Fri May  1 13:10:28 PDT 2009 from 13729.tm2
module climate;
class climate {
	double elevation[m];
	double tzoffset[h];
}
object climate {
	city "Elkins WV";
	tmyfile "WV-Elkins.tmy2";
	tzoffset -5;
	elevation 594;
}
