// $Id$
// automatically generated Fri May  1 13:10:33 PDT 2009 from 24089.tm2
module climate;
class climate {
	double elevation[m];
	double tzoffset[h];
}
object climate {
	city "Casper WY";
	tmyfile "WY-Casper.tmy2";
	tzoffset -7;
	elevation 1612;
}
