// $Id$
// automatically generated Fri May  1 13:10:33 PDT 2009 from 24018.tm2
module climate;
class climate {
	double elevation[m];
	double tzoffset[h];
}
object climate {
	city "Cheyenne WY";
	tmyfile "WY-Cheyenne.tmy2";
	tzoffset -7;
	elevation 1872;
}
