// $Id$
// automatically generated Fri May  1 13:10:33 PDT 2009 from 24021.tm2
module climate;
class climate {
	double elevation[m];
	double tzoffset[h];
}
object climate {
	city "Lander WY";
	tmyfile "WY-Lander.tmy2";
	tzoffset -7;
	elevation 1696;
}
