// $Id$
// automatically generated Fri May  1 13:10:33 PDT 2009 from 24027.tm2
module climate;
class climate {
	double elevation[m];
	double tzoffset[h];
}
object climate {
	city "Rock_springs WY";
	tmyfile "WY-Rock_springs.tmy2";
	tzoffset -7;
	elevation 2056;
}
