// $Id$
// automatically generated Fri May  1 13:10:33 PDT 2009 from 24029.tm2
module climate;
class climate {
	double elevation[m];
	double tzoffset[h];
}
object climate {
	city "Sheridan WY";
	tmyfile "WY-Sheridan.tmy2";
	tzoffset -7;
	elevation 1209;
}
