// validates proper(non-insane) calculation of lights.energy property with a variable demand fraction;
// tape input file is generic_demand.glt;
// lights.power_factor set to 1; based on the following equation:

// lights.energy = lights.load*(dt)
// dt = change in time

// payroll: d3y332


clock {
	timestamp '2000-01-01 0:00:00';
	stoptime '2000-02-01 0:00:00';
	timezone PST+8PDT;

}

module commercial;
module tape;
module assert;


object office {
	floor_area 4000 sf;
	floor_height 9 ft;
	exterior_ua 2.0;
	interior_ua 2.0;
	interior_mass 2000;
	heating_setpoint 70;
	cooling_setpoint 89;
	thermostat_deadband 4;
	lights.capacity 1000;
	lights.power_factor 1;
	object player {
		file ../generic_demand.glt;
		property lights.fraction;
	};
	object complex_assert {
		target "lights.energy";
		within 1000;
		object player {
			property value;
			file ../energy_f.player;
		};
	};
	object recorder {
		file "commercial_lights_usage.csv";
		interval 3600;
		limit 24;
		property lights.fraction,lights.load,lights.energy;
	};
}
