// makes sure sanity check of thermostat_deadband<=0 crashes simulation at appropriate times
//
// Payroll: d3y332

clock {
	timestamp '2000-01-01 0:00:00';
	stoptime '2000-02-01 0:00:00';
	timezone PST+8PDT;

}

module commercial;
module tape;


object office {
	floor_height 9 ft;
	interior_mass 2000;
	interior_ua 2;
	exterior_ua 5;
	floor_area 5000 sf;
	hvac.cooling.capacity -25000;
	hvac.heating.capacity 25000;
	heating_setpoint 70;
	cooling_setpoint 75;
	thermostat_deadband 0;
	thermostat_deadband -5; // tests both cases
	hvac.cooling.cop -3;
	hvac.heating.cop 1.25;
}
