// $Id: test-commercial-1_0.glm 1182 2008-12-22 22:08:36Z dchassin $
// Copyright (C) 2008 Battelle Memorial Institute
// commercial single-zone office test
//

#define NOFFICES=1
#define GET_WEATHER
#define BUILDING
#set threadcount=1
#set profiler=1

clock {
	timezone PST+8PDT;
	starttime '2001-01-01 00:00:00 PST';
}

#set stoptime=2001-04-01 00:00:00

module climate;
object climate {
	name weather;
	tmyfile LosAngeles.tmy2;
}

module commercial {
	warn_control FALSE;
}

class office {
	loadshape plugs_shape;
	enduse plugs_enduse;
}

schedule officehours {
	weekday {
		* 8-17 * * 1-5 # M-F 8a-5p
	}
	weekend {
		* 9-11,13-15 * * 6,0 # M-F 8a-5p
	}
}

object office:..${NOFFICES} {
	plugs_shape "type: analog; schedule: officehours; energy: 25 Btu";
	plugs_enduse "current_fraction: 0.5; impedance_fraction: 0.5; power_factor: 0.97; loadshape: plugs_shape";
	name `office_{id}`;
	floor_area random.triangle(10000,100000) sf;
	floor_height random.triangle(10,15) ft;
	interior_mass (random.triangle(1,2)*this.floor_area);
	interior_ua (this.floor_area/random.triangle(30,40));
	exterior_ua (this.floor_area/random.triangle(5,10));
	hvac.heating.design_temperature random.triangle(20,30);
	hvac.cooling.design_temperature random.triangle(95,105);
	air_temperature random.triangle(70,75) degF;
	mass_temperature random.triangle(70,75) degF;
	glazing.south 5000 sf;
	glazing.east 5000 sf;
	glazing.west 5000 sf;
	glazing.north 5000 sf;
	glazing.coefficient 0.5;
}

module tape;

#ifdef GET_WEATHER
object recorder {
	parent weather;
	property temperature,solar_flux;
	interval 3600;
	limit 8760;
	file weather.csv;
}
#endif

#ifdef BUILDING
object recorder {
	parent office_1;
	property air_temperature,hvac_mode,mass_temperature,Qh,Qs,Qi,Qz,occupancy,control.ventilation_fraction,cooling_setpoint,heating_setpoint,total_load;
	file office_1.csv;
	interval 0;
}
#endif

object collector {
	group class=office;
	property sum(occupancy),sum(energy.mag),sum(total_load.mag),max(air_temperature,min(air_temperature),avg(air_temperature),max(mass_temperature),min(mass_temperature),avg(mass_temperature);
	interval 3600; // hourly
	limit 8760;
	file total.csv;
}
