// test whether ticket:114 is fixed

#setenv GRIDLABD=../../../core
#set module_compiler_flags=VERBOSE|DEBUG|KEEPWORK|CLEAN
#set force_compile=1
#include <math.h>

// run example for 1 day
clock {
	timezone PST+8PDT;
	starttime '2009-01-01 00:00:00 PST';
	stoptime '2009-01-02 00:00:00 PST';
}

// implement a deterministic noise source and signal target
class noise {
	double source; // deterministic source
	double signal; // destination for the noisy signal
	intrinsic sync(TIMESTAMP t0, TIMESTAMP t1)
	{
		// This provides the main noise source input.
		// You can source this from either the clock (t0)
		// or the elasping simulation time (t0-starttime)
		// or some other deterministic source you like.
		source = (double)t0;
		signal = 1.0/rand();
		return t0+1; // update signal every second
	};
}

// record the output
module tape;
object noise {
	object recorder {
		property signal;
		file noise_source.csv;
		interval -1;
	};
}
