// $Id$
//

#setenv PATH=C:\Program files\Matlab\R2011a\bin\win64
link matlab.link;
//#set pauseatexit=TRUE

global complex test_complex 1+2j;

clock {
	starttime '2001-01-01 0:00:00';
	stoptime '2001-01-02 0:00:00';
}

class test {
	random x;
	random y;
	random z;
}

module tape;
object test:..5 {
	name `my_test{id}`;
	latitude 48N30:0;
	x "type:uniform(0,1); refresh:1min";
	y "type:normal(0,1); refresh:1min";
	z "type:normal(0,1); integrate; refresh:1min";
	object recorder {
		file `test_w{id}.csv`;
		property "x,y,z";
		interval 60;
	};
}
