// $Id: test_opt_alternate_syntax.glm 4738 2014-07-03 00:55:39Z dchassin $
// Copyright (C) 2008 Battelle Memorial Institute
//
// Test the use of alternate property value syntax (A) ? (B) : (C);
//

#set tmp=../test_opt_alternate_syntax
#setenv GRIDLABD=../../../core
#set force_compile=1

class test {
	enumeration {NO=0, YES=1} value;
    intrinsic create(object parent)
	{
		return 1;
	};
}

object test:..100 {
	value (random.bernoulli(0.8)) ? YES : NO;
}
