#set tmp=../test_opt_runtime_exercise_3_1_1
#setenv GRIDLABD=../../../core
#set force_compile=1

clock {
	timezone PST+8PDT;
	starttime '2001-01-01 00:00:00';
	stoptime '2001-01-02 00:00:00';
}

// Create a class called helloworld that displays the message "Hello World" on the command prompt
class helloworld {
	intrinsic create(object parent) {
		return SUCCESS;
	};
	intrinsic init(object parent) {
		return SUCCESS;
	};
	intrinsic sync(timestamp t0, timestamp t1) {
		gl_output("Hello World");
		return TS_NEVER;
	};
}

object helloworld {
}
