// $Id$
// automatically generated Thu May  7 09:19:15 PDT 2009 from 24233.tm2
module climate;
class climate {
	double elevation[m];
	double tzoffset[h];
}
object climate {
	name "weather";
	tmyfile "Washington/Seattle.tmy2";
	tzoffset -8;
	elevation 122;
}
