object inverter_dyn {
	name Inv2;
	parent node_151;
	flags DELTAMODE;
	rated_power ${inv2rate} kW;
	control_mode GRID_FORMING;//FL_CURRENT_SOURCE;


	Pref 700000;
	Qref 500000;

	Rfilter 0.0025;
	Xfilter 0.05;

	mp 3.77;  // 3.77 represents 1% droop.
    kppmax 20;
	kipmax 60;
	Pmax 1.2;
	Pmin 0;

	mq 0.05; // 0.05 represents 5% droop
};
