// Extremely simple GLM file
// Just tests to make sure the output voltage of a solar varies correctly
// when not connected to anything

#set profiler=1

clock {
	timezone PST+8PDT;
	timestamp '2010-01-01 6:00:00';
	stoptime '2010-01-01 12:00:00';
}

module generators;
module tape;
module climate;
module assert;


object climate{
	name MyClimate;
	tmyfile ../WA-Seattle.tmy2;
	//reader CsvReader;
	object recorder {
		file climate_out.csv;
		interval 3600;
		limit 120;
		property temperature,solar_direct,solar_diffuse,solar_global,ground_reflectivity;
	};
};

object solar {
	name sol_inv_B_2_645;
	generator_mode SUPPLY_DRIVEN;
	generator_status ONLINE;
	panel_type SINGLE_CRYSTAL_SILICON;
	efficiency 0.2;
	area 450;
	V_Max 79.34+0j;  // max. power voltage (Vmp) from GE solar cell performance charatcetristics
	Voc 91.22+0j;  //taken from GEPVp-200-M-Module performance characteristics, converted to degF
	Voc_Max 91.22+0j; //taken from GEPVp-200-M-Module performance characteristics,  converted to degF
	object complex_assert {
		target "V_Out";
		object player {
			property value;
			file ../solar_Vout.player;
		};
		within 0.1;  //within 1 % of variance
	};
	object recorder {
		file PV_out.csv;
		interval 60;
		limit 20000;
		property ambient_temperature,NOCT,Insolation,Voc_temp_coeff,Voc_Max,Voc,V_Max,V_Out,Tmodule;
	};
};
