//Tests multipoint efficiency of inverter model, tested for Xantrex model in this case and validated with NREL's SAM model for the same inverter type
#set profiler=1;
//#set pauseatexit=1;

clock {
     timezone PST+8PDT;
     starttime '2009-06-01 00:00:00';
     stoptime '2009-06-05 00:00:00';
}

module tape;
module climate;
module generators;
module assert;

module powerflow {
     solver_method NR;
     NR_iteration_limit 50;
};

schedule shading_value {
     // Weekday {
     * 0 * * 0-6 1.0000;
     * 1 * * 0-6 1.0000;
     * 2 * * 0-6 1.0000;
     * 3 * * 0-6 1.0000;
     * 4 * * 0-6 1.0000;
     * 5 * * 0-6 1.0000;
     * 6 * * 0-6 1.0000;
     * 7 * * 0-6 1.0000;
     * 8 * * 0-6 1.0000;
     * 9 * * 0-6 1.0000;
     * 10 * * 0-6 1.0000;
     * 11 * * 0-6 1.0000;
     * 12 * * 0-6 1.0000;
     * 13 * * 0-6 1.0000;
     * 14 * * 0-6 1.0000;
     * 15 * * 0-6 1.0000;
     * 16 * * 0-6 1.0000;
     * 17 * * 0-6 1.0000;
     * 18 * * 0-6 1.0000;
     * 19 * * 0-6 1.0000;
     * 20 * * 0-6 1.0000;
     * 21 * * 0-6 1.0000;
     * 22 * * 0-6 1.0000;
     * 23 * * 0-6 1.0000;
}


object climate {
     name "WA-Seattle";
     tmyfile "../WA-Yakima.tmy2";
	 //tmyfile "WA-Yakima.tmy2";
     interpolate QUADRATIC;
};

object triplex_meter {
	name trip_swing;
	bustype SWING;
	phases AS;
	nominal_voltage 120.0;
}

object triplex_meter {
	name trip_fixed_meter;
	parent trip_swing;
	phases AS;
	nominal_voltage 120.0;
}

object inverter {
	name trip_lat;
	phases AS;
	parent trip_fixed_meter;
	generator_mode CONSTANT_PF;
    generator_status ONLINE;
    inverter_type PWM;
    power_factor 1.0;
	inverter_manufacturer XANTREX;
	use_multipoint_efficiency true;
		 object complex_assert {
				target "VA_Out";
					object player {
						property value;
						file "../MPINV_OUT1.player";
						//file "MPINV_OUT1.player";
					};
				within 0.01;
		};
		object recorder {
				file MPINV_OUT1.csv;
       	     	interval 3600;
       	     	property VA_Out;
	    };
}

object solar {
	name trip_lat_solar;
	phases AS;
	parent trip_lat;
	Rated_kVA 4.0 kVA;
	area 29.6296 m^2;
	latitude_angle_fix true;
	efficiency 0.135;
	orientation_azimuth 25.0;
	orientation FIXED_AXIS;
	object recorder {
		property "Insolation,VA_Out.real";
		file "fixed_array_lat_angle_fix.csv";
		interval 1800;
		};
}

//Misc objects - prevent rank issue
object triplex_line_conductor {
      name triplex_4/0 AA;
      resistance 0.48;
      geometric_mean_radius 0.0158;
}

object triplex_line_configuration {
      name triplex_line_configuration_1;
      conductor_1 triplex_4/0 AA;
      conductor_2 triplex_4/0 AA;
      conductor_N triplex_4/0 AA;
      insulation_thickness 0.08;
      diameter 0.522;
}

object underground_line_conductor {
      name underground_line_conductor_2;
      //name 1000 AAC (Conc);
      rating.summer.continuous 488.0;
      outer_diameter 2.15;
      conductor_gmr 0.0371 ft;
      conductor_diameter 1.152;
      conductor_resistance 0.091872;
      neutral_gmr 0.0842565914341201 ft;
      neutral_resistance 5.3856;
      neutral_diameter 0.1019;
      neutral_strands 20.0;
      shield_gmr 0.00;
      shield_resistance 0.00;
}

object underground_line_conductor {
      name underground_line_conductor_3;
      //name 2 AL (Conc);
      rating.summer.continuous 112.0;
      outer_diameter 1.09;
      conductor_gmr 0.0088 ft;
      conductor_diameter 0.292;
      conductor_resistance 1.38336;
      neutral_gmr 0.0348162687755351 ft;
      neutral_resistance 13.5696;
      neutral_diameter 0.0641;
      neutral_strands 6.0;
      shield_gmr 0.00;
      shield_resistance 0.00;
}

object underground_line_conductor {
      name underground_line_conductor_4;
      //name 1000 AAC (Tape);
      rating.summer.continuous 775.0;
      outer_diameter 1.87;
      conductor_gmr 0.0371 ft;
      conductor_diameter 1.15;
      conductor_resistance 0.0222;
      neutral_gmr 0.0732739718442675 ft;
      neutral_resistance 0.05;
      neutral_diameter 0.102;
      neutral_strands 20.0;
      shield_gmr 0.00;
      shield_resistance 0.00;
}
