// test schedule transforms

#set randomseed=17
#set module_compiler_flags=VERBOSE|DEBUG|KEEPWORK|CLEAN
#set force_compile=1

extern "C" test_schedule_xform_external : myfunction2@1 // inline code follows
{
	int myfunction2(int nlhs, GLXDATA *plhs, int nrhs, GLXDATA *prhs)
	{	/* make sure the correct number of args are passed in */
		if ( nlhs!=1 || nlhs!=1 ) return -1;
		/* subtract 5 from arg */
		GLXdouble(plhs[0]) = GLXdouble(prhs[0]) - 5;
		return 0;
	}
} // end inline code

// DPC: removed because validate.py does not handle such external dependencies well
// extern "C" extern_test : myfunction, myfunction1; // only first one is defined in test_extern_function (tests warning)

module residential {
	implicit_enduses NONE;
	default_outdoor_temperature 70.5;
}
module assert;

clock {
	timezone PST+8PDT;
	starttime '2009-01-01 0:00:00 PST';
	stoptime '2009-01-02 0:00:00 PST';
}

schedule test_schedule {
	0-29 * * * * 0
	30-59 * * * * 1
}

schedule test_schedule_inv {
	0-29 * * * * 1
	30-59 * * * * 0
}

class house {
	double myvalue;
}

module tape;
class player {
	double value;
}
object player {
	name t_mass;
	file ../t_mass.csv;
}

object house {

	// transform references property in as-yet undefined object
	cooling_setpoint House1.cooling_setpoint+1;

	// transform references property in this object
	heating_setpoint myfunction2(this.cooling_setpoint);

	// transform references schedule
	air_temperature test_schedule+70;

	// transform references player
	mass_temperature t_mass.value;

	object double_assert {
		status ASSERT_TRUE;
		once ONCE_DONE;
		within 1;
		value 70;
		target air_temperature;
	};
}
object house {
	name House1;
}
