// $Id: Quillayute.glm 4738 2014-07-03 00:55:39Z dchassin $
// automatically generated Thu May  7 09:19:17 PDT 2009 from 94240.tm2
module climate;
class climate {
	double elevation[m];
	double tzoffset[h];
}
object climate {
	name "Quillayute WA";
	tmyfile "Washington/Quillayute.tmy2";
	tzoffset -8;
	elevation 55;
}
