// Design a market to test the SELLERS_ONLY and BUYERS_ONLY special operation modes. Ensure the market automatically submits a
// bid using the fixed_price or fixed_quantity parameters. Ensure the market clears to an appropriate value, including an
// unresolvable condition (i.e., if the market can't clear, ensure it doesn't and returns appropriate outputs).

#set tmp=../test_market_auction_advanced_1
#setenv GRIDLABD=../../../core

module tape;
module market;
module assert;

clock {
	timezone PST+8PDT;
	starttime '2001-01-01 00:00:00';
	stoptime '2001-01-02 00:00:00';
}

schedule buyer_price1 { // buyers_only,fixed_quantity
	* 0-5 * * * 30;
	* 6-12 * * * 30;
	* 13-18 * * * 30;
	* 19-23 * * * 30;
}

schedule buyer_price2 { // buyers_only,fixed_quantity
	* 0-5 * * * 20;
	* 6-12 * * * 20;
	* 13-18 * * * 20;
	* 19-23 * * * 20;
}

schedule seller_quantity_1 { // buyers_only,fixed_quantity
	* 0-6 * * * 0;
	* 7-13 * * * 15;
	* 14-19 * * * 25;
	* 20-23 * * * 10;
}

schedule buyer_price3 { // buyers_only,fixed_price
	* 0-7 * * * 30;
	* 8-15 * * * 25;
	* 16-23 * * * 30;
}

schedule buyer_price4 { // buyers_only,fixed_price
	* 0-7 * * * 20;
	* 8-15 * * * 15;
	* 16-23 * * * 20;
}

schedule buyers_fixed_price { // buyers_only,fixed_price
	* 0-8 * * * 25;
	* 9-16 * * * 30;
	* 17-23 * * * 20;
}

schedule buyer_quantity { // all buyers_only
	* * * * * 10;
}

schedule seller_price1 {  // sellers_only,fixed_quantity
	* 0-5 * * * 5;
	* 6-12 * * * 5;
	* 13-18 * * * 5;
	* 19-23 * * * 5;
}

schedule seller_price2 { // sellers_only,fixed_quantity
	* 0-5 * * * 15;
	* 6-12 * * * 15;
	* 13-18 * * * 15;
	* 19-23 * * * 15;
}

schedule sellers_fixed_quantity { // sellers_only,fixed_quantity
	* 0-5 * * * 0;
	* 6-12 * * * 15;
	* 13-18 * * * 25;
	* 19-23 * * * 10;
}

schedule seller_price3 { // sellers_only,fixed_price
	* 0-3 * * * 5;
	* 4-7 * * * 10;
	* 8-11 * * * 5;
	* 12-15 * * * 5;
	* 16-19 * * * 10;
	* 20-23 * * * 5;
}

schedule seller_price4 { // sellers_only,fixed_price
	* 0-3 * * * 15;
	* 4-7 * * * 20;
	* 8-11 * * * 15;
	* 12-15 * * * 15;
	* 16-19 * * * 20;
	* 20-23 * * * 15;
}

schedule seller_fixed_price { // sellers_only,fixed_price
	* 0-4 * * * 10;
	* 5-8 * * * 5;
	* 9-12 * * * 15;
	* 13-16 * * * 10;
	* 17-20 * * * 5;
	* 21-23 * * * 15;
}

schedule seller_quantity_2 {  // all sellers_only
	* * * * * 10;
}

schedule cp1 {
	* 0-6 * * * 0;		//BUG: should be 35.0001
	* 7-13 * * * 20;
	* 14-19 * * * 0;	//BUG: should be 35.0001
	* 20-23 * * * 30;
}
schedule cq1 {
	* 0-6 * * * 0;
	* 7-13 * * * 15;
	* 14-19 * * * 0;
	* 20-23 * * * 10;
}

schedule cp2 {
	* 0-8 * * * 25;
	* 9-16 * * * 30;
	* 17-23 * * * 20;
}
schedule cq2 {
	* 0-8 * * * 10;
	* 9-16 * * * 0;
	* 17-23 * * * 20;
}

schedule cp3 {
	* 0-5 * * * 0;  	//BUG: should be 4.9999
	* 6-12 * * * 15;
	* 13-18 * * * 0;	//BUG: should be 4.9999
	* 19-23 * * * 5;
}
schedule cq3 {
	* 0-5 * * * 0;
	* 6-12 * * * 15;
	* 13-18 * * * 0;
	* 19-23 * * * 10;
}

schedule cp4 {
	* 0-4 * * * 10;
	* 5-8 * * * 5;
	* 9-12 * * * 15;
	* 13-16 * * * 10;
	* 17-20 * * * 5;
	* 21-23 * * * 15;
}
schedule cq4 {
	* 0-4 * * * 10;
	* 5-8 * * * 0;
	* 9-12 * * * 20;
	* 13-16 * * * 10;
	* 17-20 * * * 0;
	* 21-23 * * * 20;
}

object auction { // buyers_only,fixed_quantity
	name Market_1;
	type DOUBLE;
	unit MWh;
	period 3600;
	verbose TRUE;
	special_mode BUYERS_ONLY;
	init_price 35.0001;
	fixed_quantity seller_quantity_1*1;
	warmup 0;
	// object multi_recorder {
		// property current_market.clearing_price,current_market.clearing_quantity,buyer_1:price,buyer_2:price,fixed_price,fixed_quantity;
		// file "test_market_auction_advanced_1_1.csv";
		// interval 3600;
		// limit 200;
	// };
	object double_assert{
		target "current_market.clearing_price";
		in '2001-01-01 1:00:00';
		status ASSERT_TRUE;
		value cp1*1;
		within 0.00001;
	};

	object double_assert{
		target "current_market.clearing_quantity";
		in '2001-01-01 1:00:00';
		status ASSERT_TRUE;
		value cq1*1;
		within 0.001; // asserting clearing quantity
	};
}

object auction { // buyers_only,fixed_price
	name Market_2;
	type DOUBLE;
	unit MWh;
	period 3600;
	verbose TRUE;
	special_mode BUYERS_ONLY;
	init_price 25;
	fixed_price buyers_fixed_price*1;
	warmup 0;
	// object multi_recorder {
		// property current_market.clearing_price,current_market.clearing_quantity,special_mode,fixed_price,current_market.clearing_type;
		// file "test_market_auction_advanced_1_2.csv";
		// interval 3600;
		// limit 168;
	// };
	object double_assert{
		target "current_market.clearing_price";
		in '2001-01-01 1:00:00';
		status ASSERT_TRUE;
		value cp2*1;
		within 0.00001;
	};

	object double_assert{
		target "current_market.clearing_quantity";
		in '2001-01-01 1:00:00';
		status ASSERT_TRUE;
		value cq2*1;
		within 0.001; // asserting clearing quantity
	};
}

object auction { // sellers_only,fixed_quantity
	name Market_3;
	type DOUBLE;
	unit MWh;
	period 3600;
	verbose TRUE;
	special_mode SELLERS_ONLY;
	init_price 35;
	// fixed_price 35;
	fixed_quantity sellers_fixed_quantity*1;
	warmup 0;
	// object multi_recorder {
		// property current_market.clearing_price,current_market.clearing_quantity,special_mode,fixed_price,fixed_quantity,current_market.clearing_type;
		// file "test_market_auction_advanced_1_3.csv";
		// interval 3600;
		// limit 168;
	// };
	object double_assert{
		target "current_market.clearing_price";
		in '2001-01-01 1:00:00';
		status ASSERT_TRUE;
		value cp3*1;
		within 0.00001;
	};

	object double_assert{
		target "current_market.clearing_quantity";
		in '2001-01-01 1:00:00';
		status ASSERT_TRUE;
		value cq3*1;
		within 0.001; // asserting clearing quantity
	};
}

object auction { // sellers_only,fixed_price
	name Market_4;
	type DOUBLE;
	unit MWh;
	period 3600;
	verbose TRUE;
	special_mode SELLERS_ONLY;
	init_price 35;
	fixed_price seller_fixed_price*1;
	// fixed_quantity 3;
	warmup 0;
	// object multi_recorder {
		// property current_market.clearing_price,current_market.clearing_quantity,special_mode,fixed_price,fixed_quantity,current_market.clearing_type;
		// file "test_market_auction_advanced_1_4.csv";
		// interval 3600;
		// limit 168;
	// };
	object double_assert{
		target "current_market.clearing_price";
		in '2001-01-01 1:00:00';
		status ASSERT_TRUE;
		value cp4*1;
		within 0.00001;
	};

	object double_assert{
		target "current_market.clearing_quantity";
		in '2001-01-01 1:00:00';
		status ASSERT_TRUE;
		value cq4*1;
		within 0.001; // asserting clearing quantity
	};
}

// test object to create simple buyers and sellers

class test {
	int64 next_t;
	int64 new_bid_id;
	double bid_period;
	int16 count;
	object market;
	enumeration {BUYER=0, SELLER=1} role;
	int32 lastbid_id;
	int64 lastmkt_id;
	double price;		//Added in so price can be specified
	double quantity;	//Added in so quantity can be specified
	public int64 *thismkt_id;
	function auction::submit_bid;
	intrinsic create (object parent)
	{
		return SUCCESS;
	};
	intrinsic init (object parent)
	{
		new_bid_id = -1;
		next_t = 0;
		lastbid_id = -1;
		lastmkt_id = -1;
		if (market==NULL)
			throw "market is not defined";
		thismkt_id = (int64*)gl_get_addr(market,"market_id");
		if (thismkt_id==NULL)
			throw "market does not define market_id";
		return SUCCESS;
	};
	intrinsic sync (TIMESTAMP t0, TIMESTAMP t1)
	{
		if (t1==next_t || next_t==0)
		{
			next_t=t1+bid_period;
			lastbid_id = (int32)submit_bid(market,my,role==BUYER?-quantity:quantity,price,*thismkt_id!=lastmkt_id?new_bid_id:lastbid_id);
			count--;
			lastmkt_id = *thismkt_id;
		}
		if (count>0)
			return next_t;
		else
			return TS_NEVER;
	};
}

object test {
	name buyer_1;
	role BUYER;
	bid_period 3600;
	market Market_1;
	price buyer_price1*1;
	quantity buyer_quantity*1;
	count 10000;
}

object test {
	name buyer_2;
	role BUYER;
	bid_period 3600;
	market Market_1;
	price buyer_price2*1;
	quantity buyer_quantity*1;
	count 10000;
}

object test {
	name buyer_3;
	role BUYER;
	bid_period 3600;
	market Market_2;
	price buyer_price3*1;
	quantity buyer_quantity*1;
	count 10000;
}

object test {
	name buyer_4;
	role BUYER;
	bid_period 3600;
	market Market_2;
	price buyer_price4*1;
	quantity buyer_quantity*1;
	count 10000;
}

object test {
	name seller_1;
	role SELLER;
	bid_period 3600;
	market Market_3;
	price seller_price1*1;
	quantity seller_quantity_2*1;
	count 10000;
}

object test {
	name seller_2;
	role SELLER;
	bid_period 3600;
	market Market_3;
	price seller_price2*1;
	quantity seller_quantity_2*1;
	count 10000;
}

object test {
	name seller_3;
	role SELLER;
	bid_period 3600;
	market Market_4;
	price seller_price3*1;
	quantity seller_quantity_2*1;
	count 10000;
}

object test {
	name seller_4;
	role SELLER;
	bid_period 3600;
	market Market_4;
	price seller_price4*1;
	quantity seller_quantity_2*1;
	count 10000;
}
