// Design a market to examine unbalanced bidding. Create a test with unequal buyers and sellers, such as one seller and three buyers and vice versa.
// Ensure the market still clears to a reasonable value.

#set tmp=../test_market_auction_clearing_6_morebuyers
#setenv path=c:/mingw/bin
#setenv INCLUDE=c:/mingw/include
#set include=../../../core
#set suppress_repeat_messages=0

module tape;
module market;
module assert;

clock {
	timezone PST+8PDT;
	starttime '2001-01-01 00:00:00';
	stoptime '2001-01-03 00:00:00';
}

schedule buyer_price1 {
	* 0-1 * * * 40;   // buyers with same bids, different quantities, enough supply*
	* 2-3 * * * 50;   // buyers with different bids, same quantities, enough supply*
	* 4-5 * * * 40;   // buyers with same bids, different quantities, not enough supply*
	* 6-7 * * * 45;   // buyers with different bids, same quantities, not enough supply*
	* 8-9 * * * 40;   // buyers with same bids, same quantities, not enough supply*
	* 10-11 * * * 40; // buyers with same bids, same quantities, enough supply*
	* 12-13 * * * 40; // seller with enough supply
	* 14-15 * * * 40; // seller with enough supply
	* 16-17 * * * 40; // seller with not enough supply
	* 18-19 * * * 50; // seller with not enough supply
	* 20-21 * * * 40; // seller with not enough supply
	* 22-23 * * * 40; // seller with enough supply
}

schedule buyer_price2 {
	* 0-1 * * * 40;   // buyers with same bids, different quantities, enough supply
	* 2-3 * * * 40;   // buyers with different bids, same quantities, enough supply
	* 4-5 * * * 40;   // buyers with same bids, different quantities, not enough supply
	* 6-7 * * * 40;   // buyers with different bids, same quantities, not enough supply
	* 8-9 * * * 40;   // buyers with same bids, same quantities, not enough supply
	* 10-11 * * * 40; // buyers with same bids, same quantities, enough supply
	* 12-13 * * * 40; // seller with enough supply
	* 14-15 * * * 40; // seller with enough supply
	* 16-17 * * * 40; // seller with not enough supply
	* 18-19 * * * 40; // seller with not enough supply
	* 20-21 * * * 40; // seller with not enough supply
	* 22-23 * * * 40; // seller with enough supply
}

schedule seller_price1 {
	* 0-1 * * * 30;   // buyers with same bids, different quantities, enough supply
	* 2-3 * * * 30;   // buyers with different bids, same quantities, enough supply
	* 4-5 * * * 30;   // buyers with same bids, different quantities, not enough supply
	* 6-7 * * * 30;   // buyers with different bids, same quantities, not enough supply
	* 8-9 * * * 30;   // buyers with same bids, same quantities, not enough supply
	* 10-11 * * * 30; // buyers with same bids, same quantities, enough supply
	* 12-13 * * * 40; // seller with enough supply*
	* 14-15 * * * 35; // seller with enough supply*
	* 16-17 * * * 40; // seller with not enough supply*
	* 18-19 * * * 45; // seller with not enough supply*
	* 20-21 * * * 40; // seller with not enough supply*
	* 22-23 * * * 40; // seller with enough supply
}

// schedule seller_price2 {
	// * 0-1 * * * 30;   // buyers with same bids, different quantities, enough supply
	// * 2-3 * * * 30;   // buyers with different bids, same quantities, enough supply
	// * 4-5 * * * 30;   // buyers with same bids, different quantities, not enough supply
	// * 6-7 * * * 30;   // buyers with different bids, same quantities, not enough supply
	// * 8-9 * * * 30;   // buyers with same bids, same quantities, not enough supply
	// * 10-11 * * * 30; // buyers with same bids, same quantities, enough supply
	// * 12-13 * * * 40; // seller with enough supply
	// * 14-15 * * * 40; // seller with enough supply
	// * 16-17 * * * 40; // seller with not enough supply
	// * 18-19 * * * 40; // seller with not enough supply
	// * 20-21 * * * 40; // seller with not enough supply
	// * 22-23 * * * 40; // seller with enough supply
// }

schedule buyer_quantity1 {
	* 0-1 * * * 6;   // buyers with same bids, different quantities, enough supply
	* 2-3 * * * 5;   // buyers with different bids, same quantities, enough supply
	* 4-5 * * * 5;   // buyers with same bids, different quantities, not enough supply
	* 6-7 * * * 3;   // buyers with different bids, same quantities, not enough supply
	* 8-9 * * * 5.5;   // buyers with same bids, same quantities, not enough supply
	* 10-11 * * * 4; // buyers with same bids, same quantities, enough supply
	* 12-13 * * * 4; // seller with enough supply
	* 14-15 * * * 4; // seller with enough supply
	* 16-17 * * * 4; // seller with not enough supply
	* 18-19 * * * 4; // seller with not enough supply
	* 20-21 * * * 4; // seller with not enough supply
	* 22-23 * * * 4; // seller with enough supply
}

schedule buyer_quantity2 {
	* 0-1 * * * 8;   // buyers with same bids, different quantities, enough supply
	* 2-3 * * * 5;   // buyers with different bids, same quantities, enough supply
	* 4-5 * * * 3;   // buyers with same bids, different quantities, not enough supply
	* 6-7 * * * 3;   // buyers with different bids, same quantities, not enough supply
	* 8-9 * * * 5.5;   // buyers with same bids, same quantities, not enough supply
	* 10-11 * * * 4; // buyers with same bids, same quantities, enough supply
	* 12-13 * * * 4; // seller with enough supply
	* 14-15 * * * 4; // seller with enough supply
	* 16-17 * * * 4; // seller with not enough supply
	* 18-19 * * * 4; // seller with not enough supply
	* 20-21 * * * 4; // seller with not enough supply
	* 22-23 * * * 4; // seller with enough supply
}

schedule seller_quantity1 {
	* 0-1 * * * 7;   // buyers with same bids, different quantities, enough supply
	* 2-3 * * * 6;   // buyers with different bids, same quantities, enough supply
	* 4-5 * * * 2;   // buyers with same bids, different quantities, not enough supply
	* 6-7 * * * 2.5;   // buyers with different bids, same quantities, not enough supply
	* 8-9 * * * 4;   // buyers with same bids, same quantities, not enough supply
	* 10-11 * * * 5; // buyers with same bids, same quantities, enough supply
	* 12-13 * * * 5; // seller with enough supply
	* 14-15 * * * 6; // seller with enough supply
	* 16-17 * * * 3; // seller with not enough supply
	* 18-19 * * * 5; // seller with not enough supply
	* 20-21 * * * 3; // seller with not enough supply
	* 22-23 * * * 5; // seller with enough supply
}

// schedule seller_quantity2 {
	// * 0-1 * * * 9;   // buyers with same bids, different quantities, enough supply
	// * 2-3 * * * 6;   // buyers with different bids, same quantities, enough supply
	// * 4-5 * * * 4;   // buyers with same bids, different quantities, not enough supply
	// * 6-7 * * * 2.5;   // buyers with different bids, same quantities, not enough supply
	// * 8-9 * * * 4.5;   // buyers with same bids, same quantities, not enough supply
	// * 10-11 * * * 6; // buyers with same bids, same quantities, enough supply
	// * 12-13 * * * 4; // seller with enough supply
	// * 14-15 * * * 6; // seller with enough supply
	// * 16-17 * * * 4; // seller with not enough supply
	// * 18-19 * * * 5; // seller with not enough supply
	// * 20-21 * * * 3; // seller with not enough supply
	// * 22-23 * * * 5; // seller with enough supply
// }

schedule assert_clearing_price{
	* 1-2 * * * 35;   // buyers with same bids, different quantities, enough supply(seller_price)
	* 3-4 * * * 30;   // buyers with different bids, same quantities, enough supply(seller_price)
	* 5-6 * * * 40;   // buyers with same bids, different quantities, not enough supply(bidder_price)
	* 7-8 * * * 40;   // buyers with different bids, same quantities, not enough supply(low_bidder_price)
	* 9-10 * * * 40;   // buyers with same bids, same quantities, not enough supply(bidder_price)
	* 11-12 * * * 30; // buyers with same bids, same quantities, enough supply(seller_price)
	* 13-14 * * * 40; // seller with enough supply(seller_price)
	* 15-16 * * * 35; // seller with enough supply(high_seller_price)
	* 17-18 * * * 40; // seller with not enough supply(bidder_price)
	* 19-20 * * * 45; // seller with not enough supply(bidder_price)
	* 21-22 * * * 40; // seller with not enough supply(bidder_price)
	* 23-0 * * * 40; // seller with enough supply(seller_bid))
}

schedule assert_clearing_quantity{
	* 1-2 * * * 14;   // buyers with same bids, different quantities, enough supply(bidder_quantity)*
	* 3-4 * * * 10;   // buyers with different bids, same quantities, enough supply(bidder_quantity)*
	* 5-6 * * * 4;   // buyers with same bids, different quantities, not enough supply(seller_quantity)*
	* 7-8 * * * 5;   // buyers with different bids, same quantities, not enough supply(seller_quantity)*
	* 9-10 * * * 8;   // buyers with same bids, same quantities, not enough supply(seller_quantity)*
	* 11-12 * * * 8; // buyers with same bids, same quantities, enough supply(bidder_quantity)*
	* 13-14 * * * 8; // seller with enough supply(bidder_quantity)*
	* 15-16 * * * 8; // seller with enough supply(bidder_quantity)*
	* 17-18 * * * 6; // seller with not enough supply(seller_quantity)*
	* 19-20 * * * 4; // seller with not enough supply(seller_quantity)*
	* 21-22 * * * 6; // seller with not enough supply(seller_quantity)*
	* 23-0 * * * 8; // seller with enough supply(bidder_quantity)*
}

object auction {
	name Market_1;
	type DOUBLE;
	unit MWh;
	period 3600;
	verbose FALSE;
	special_mode NONE;
	warmup 0;
	object multi_recorder {
		property current_market.clearing_price,current_market.clearing_quantity,buyer_1:price,buyer_1:quantity,buyer_2:price,buyer_2:quantity,seller_1:price,seller_1:quantity,;
		file "test_auction_3.csv";
		interval 3600;
		limit 240;
	};
	object double_assert{
		target "current_market.clearing_price";
		in '2001-01-02 01:00:00';
		value assert_clearing_price*1;
		out '2001-01-03 00:00:00';
		status ASSERT_TRUE;
		within 0.0001; // asserting clearing price
	};

	object double_assert{
		target "current_market.clearing_quantity";
		in '2001-01-02 01:00:00';
		value assert_clearing_quantity*1;
		out '2001-01-03 00:00:00';
		status ASSERT_TRUE;
		within 0.0001; // asserting clearing quantity
	};

}

// test object to create simple buyers and sellers

class test {
	int64 next_t;
	int64 new_bid_id;
	double bid_period;
	int16 count;
	object market;
	enumeration {BUYER=0, SELLER=1} role;
	int32 lastbid_id;
	int64 lastmkt_id;
	double price;		//Added in so price can be specified
	double quantity;	//Added in so quantity can be specified
	public int64 *thismkt_id;
	function auction::submit_bid;
	intrinsic create (object parent)
	{
		return SUCCESS;
	};
	intrinsic init (object parent)
	{
		new_bid_id = -1;
		next_t = 0;
		lastbid_id = -1;
		lastmkt_id = -1;
		if (market==NULL)
			throw "market is not defined";
		thismkt_id = (int64*)gl_get_addr(market,"market_id");
		if (thismkt_id==NULL)
			throw "market does not define market_id";
		return SUCCESS;
	};
	intrinsic sync (TIMESTAMP t0, TIMESTAMP t1)
	{
		if (t1==next_t || next_t==0)
		{
			next_t=t1+bid_period;
			lastbid_id = (int32)submit_bid(market,my,role==BUYER?-quantity:quantity,price,*thismkt_id!=lastmkt_id?new_bid_id:lastbid_id);
			count--;
			lastmkt_id = *thismkt_id;
		}
		if (count>0)
			return next_t;
		else
			return TS_NEVER;
	};
}

object test {
	name buyer_1;
	role BUYER;
	bid_period 1800;
	market Market_1;
	price buyer_price1*1;
	quantity buyer_quantity1*1;
	count 10000;
}

object test {
	name buyer_2;
	role BUYER;
	bid_period 1800;
	market Market_1;
	price buyer_price2*1;
	quantity buyer_quantity2*1;
	count 10000;
}

object test {
	name seller_1;
	role SELLER;
	bid_period 1800;
	market Market_1;
	price seller_price1*1;
	quantity seller_quantity1*2;
	count 10000;
}

// object test {
	// name seller_2;
	// role SELLER;
	// bid_period 1800;
	// market Market_1;
	// price seller_price2*1;
	// quantity seller_quantity2*1;
	// count 10000;
// }
