//test_market_quantity_conversion.glm tests to make sure bid quantity units are properly converted

#set tmp=c:../test_market_quantity_conversion
#setenv GLPATH=../../../core;../../../core/etc
#setenv GRIDLABD=../../../core
#set include=../../../core

clock {
	timezone PST+8PDT;
	starttime '2001-01-01 00:00:00';
	stoptime '2001-01-01 02:00:00';
}

module market;
module tape;
module assert;

class test {
	int64 next_t;
	int64 new_bid_id;
	double bid_period;
	int16 count;
	object market;
	enumeration {BUYER=0, SELLER=1} role;
	int32 lastbid_id;
	int64 lastmkt_id;
	double price;		// Added in so price can be specified
	double quantity[kW];	// Added in so quantity can be specified
	public int64 *thismkt_id;
	function auction::submit_bid;
	intrinsic create (object parent)
	{
		return SUCCESS;
	};
	intrinsic init (object parent)
	{
		new_bid_id = -1;
		next_t = 0;
		lastbid_id = -1;
		lastmkt_id = -1;
		if (market==NULL)
			throw "market is not defined";
		thismkt_id = (int64*)gl_get_addr(market,"market_id");
		if (thismkt_id==NULL)
			throw "market does not define market_id";
		return SUCCESS;
	};
	intrinsic sync (TIMESTAMP t0, TIMESTAMP t1)
	{
		if (t1==next_t || next_t==0)
		{
			next_t=t1+bid_period;
			lastbid_id = (int32)submit_bid(market,my,role==BUYER?-quantity:quantity,price,*thismkt_id!=lastmkt_id?new_bid_id:lastbid_id);
			count--;
			lastmkt_id = *thismkt_id;
		}
		if (count>0)
			return next_t;
		else
			return TS_NEVER;
	};
}

object auction {
	name auction1;
	unit "MW";
	period 3600;
	type DOUBLE;
	warmup 0;
	latency 0;
	verbose TRUE;
	pricecap 9999;
	special_mode NONE;
	fixed_price 10;
	object double_assert {
		target current_market.clearing_price;
		status ASSERT_TRUE;
		in '2001-01-01 1:00:00';
		value 10;
		within 1e-9;
	};
	object double_assert {
		target current_market.clearing_quantity;
		status ASSERT_TRUE;
		in '2001-01-01 1:00:00';
		value 0.1;
		within 1e-9;
	};
}

object test {
	name buyer1;
	role BUYER;
	price 20;
	quantity 100;
	bid_period 3600;
	market auction1;
	count 2;
}

object test {
	name buyer2;
	role BUYER;
	price 5;
	quantity 100;
	bid_period 3600;
	market auction1;
	count 2;
}

object test {
	name seller1;
	role SELLER;
	price 10;
	quantity 200;
	bid_period 3600;
	market auction1;
	count 2;
}
