//This file tests that the appropriate variables
//are set correctly when the market fails to clear
//because of unresponsive buyer demand

//Bidding period: 3600 s
//Buyer1: bid 9999, quantity: 50, period: 3600 s (unresponsive buyer)
//Buyer2: bid 47, quantity: 5, period: 3600 s
//Buyer3: bid 32, quantity: 5, period: 3600 s
//Seller1: bid 70, quantity: 5, period: 3600 s
//Seller2: bid 83, quantity: 5, period: 3600 s
//Seller3: bid 97, quantity: 5, period: 3600 s

//Expected clearing price: 9999
//Expected clearing quantity: 15

//The clearing type should be set to FAILURE

#set tmp=../test_markets_auction_unresponsive_buyer_failure
#setenv GRIDLABD=../../../core

#define stylesheet=http://gridlab-d.svn.sourceforge.net/viewvc/gridlab-d/trunk/core/gridlabd-2_0

module market;
module tape;
module assert;

clock {
	timezone PST+8PDT;
	starttime '2001-01-01 00:00:00';
	stoptime '2001-01-03 00:00:00';
}

class auction {
    double current_price_mean_24h;
	double current_price_stdev_24h;
}

object auction {
	name Market_1;
	type DOUBLE;
	unit MWh;
	period 3600;
	verbose TRUE;
	special_mode NONE;
	warmup 0;
	init_price 9999;
	init_stdev 1e-6;
	price_cap 9999;
	object multi_recorder {
		property current_market.clearing_price,current_market.clearing_quantity,current_market.clearing_type,current_market.marginal_quantity,current_price_mean_24h,current_price_stdev_24h,buyer1:price,buyer1:quantity,buyer2:price,buyer2:quantity,buyer3:price,buyer3:quantity,seller1:price,seller1:quantity,seller2:price,seller2:quantity,seller3:price,seller3:quantity,price_cap;
		file "test_markets_auction_unresponsive_buyer_failure_output.csv";
		interval 3600;
		limit 168;
	};
	object double_assert {
		in '2001-01-01 01:00:00';
		value 9999;
		within 1e-4;
		target "current_market.clearing_price";
	};
	object double_assert {
		in '2001-01-01 01:00:00';
		value 15;
		within 1e-5;
		target "current_market.clearing_quantity";
	};
	object double_assert {
		value 9999;
		within 1e-4;
		target "current_price_mean_24h";
	};
	object double_assert {
		value 0;
		within 1e-5;
		target "current_price_stdev_24h";
	};
	object enum_assert {
		in '2001-01-01 01:00:00';
		value 5;	//Should be FAILURE, but is MARGINAL_BUYER instead - FIXED
		target "current_market.clearing_type";
	};
	object double_assert {
		in '2001-01-01 01:00:00';
		value 0; //Consider infinite number of unresponsive buyers w/ infinitesimal demands
		target "current_market.marginal_quantity";
		within 1e-5;
	};
	object double_assert {
		in '2001-01-01 01:00:00';
		value 15;
		target "current_market.seller_total_quantity";
		within 1e-5;
	};
	object double_assert {
		in '2001-01-01 01:00:00';
		value 60;
		target "current_market.buyer_total_quantity";
		within 1e-5;
	};
	object double_assert {
		in '2001-01-01 01:00:00';
		value 70 ;
		target "current_market.seller_min_price";
		within 1e-5;
	};
}

// test object to create simple buyers and sellers
class test {
	int64 next_t;
	int64 new_bid_id;
	double bid_period;
	int16 count;
	object market;
	enumeration {BUYER=0, SELLER=1} role;
	int32 lastbid_id;
	int64 lastmkt_id;
	double price;		//Added in so price can be specified
	double quantity;	//Added in so quantity can be specified
	public int64 *thismkt_id;
	function auction::submit_bid;
	intrinsic create (object parent)
	{
		return SUCCESS;
	};
	intrinsic init (object parent)
	{
		new_bid_id = -1;
		next_t = 0;
		lastbid_id = -1;
		lastmkt_id = -1;
		if (market==NULL)
			throw "market is not defined";
		thismkt_id = (int64*)gl_get_addr(market,"market_id");
		if (thismkt_id==NULL)
			throw "market does not define market_id";
		return SUCCESS;
	};
	intrinsic sync (TIMESTAMP t0, TIMESTAMP t1)
	{
		if (t1==next_t || next_t==0)
		{
			next_t=t1+bid_period;
			lastbid_id = (int32)submit_bid(market,my,role==BUYER?-quantity:quantity,price,*thismkt_id!=lastmkt_id?new_bid_id:lastbid_id);
			count--;
			lastmkt_id = *thismkt_id;
		}
		if (count>0)
			return next_t;
		else
			return TS_NEVER;
	};
}

object test {
	name buyer1;
	role BUYER;
	bid_period 3600;
	market Market_1;
	price 9999;
	quantity 50;
	count 10000;
};

object test {
	name buyer2;
	role BUYER;
	bid_period 3600;
	market Market_1;
	price 32;
	quantity 5;
	count 10000;
}

object test {
	name buyer3;
	role BUYER;
	bid_period 3600;
	market Market_1;
	price 47;
	quantity 5;
	count 10000;
}

object test {
	name seller1;
	role SELLER;
	bid_period 3600;
	market Market_1;
	price 83;
	quantity 5;
	count 10000;
}

object test {
	name seller2;
	role SELLER;
	bid_period 3600;
	market Market_1;
	price 97;
	quantity 5;
	count 10000;
}

object test {
	name seller3;
	role SELLER;
	bid_period 3600;
	market Market_1;
	price 70;
	quantity 5;
	count 10000;
};
