// This is a test of whether schedules are
// skewed correctly when transitioning from
// one year to another

#set tmp=../test_skew_year_transitions
#setenv GRIDLABD=../../../core

module market;
module tape;
module assert;

clock {
	timezone PST+8PDT;
	starttime '2010-12-31 12:00:00';
	stoptime '2011-01-01 12:00:00';
}

schedule fixed_prices {
	* 0 * * * 0.5;
	* 1 * * * 1.5;
	* 2 * * * 2;
	* 3 * * * 3;
	* 4 * * * 4;
	* 5 * * * 5;
	* 6 * * * 6;
	* 7 * * * 7;
	* 8 * * * 8;
	* 9 * * * 9;
	* 10 * * * 10;
	* 11 * * * 11;
	* 12 * * * 12;
	* 13 * * * 13;
	* 14 * * * 14;
	* 15 * * * 15;
	* 16 * * * 16;
	* 17 * * * 17;
	* 18 * * * 18;
	* 19 * * * 19;
	* 20 * * * 20;
	* 21 * * * 21;
	* 22 * * * 22;
	* 23 * * * 23;
}

object auction {
	name Market_1;
	type DOUBLE;
	unit kW;
	period 1h;
	verbose TRUE;
	special_mode SELLERS_ONLY;
	schedule_skew 3600;
	fixed_price fixed_prices*1;
	warmup 0;
	init_price 0.5;
	init_stdev 0;
	object recorder {
		property fixed_price;
		file "test_skew_year_transitions_output.csv";
		interval 1h;
		limit 48;
	};
}
