// $Id$
//
// Test of mysql module player class
//
// This test is design to test the following mysql::player functionalities
// 1) property and unit conversion
// 2) trigger
// 3) limit
// 4) interval
//
// In addition, this test verifies the on_init
//

#ifdef MYSQL

clock {
	timezone PST+8PDT;
	starttime '2000-01-01 00:00:00 PST';
	stoptime '2000-01-02 00:00:00 PST';
}

module mysql;
object database {
	// use defaults as though replacing a tape module
	on_init ../test_mysql_player_init.sql;
	options NEWDB;
	clientflags LOCAL_FILES;
}

class test {
	double x[h];
}

object test:..2 {
	object player {
		table `test_player`;
		property x[min];
	};
}

#endif
