// $Id$
//
// Test of mysql module player class
//
// This test is design to test the following mysql::player functionalities
// 1) property and unit conversion
// 2) trigger
// 3) limit
// 4) interval
//
// In addition, this test verifies the on_init
//
//
// NOTE: This functionality requires the "local_infile" global to be set, otherwise
// you may get an error about the command not being allowed in this version of MySQL.
// In the MySQL server command line:
// mysql> SET GLOBAL local_infile = 'ON';

#ifdef MYSQL

clock {
	timezone PST+8PDT;
	starttime '2000-01-01 00:00:00 PST';
	stoptime '2000-01-02 00:00:00 PST';
}

module mysql;
object database {
	// use defaults as though replacing a tape module
   on_init ../test_mysql_player_init.sql;
   hostname "localhost";
   username "gridlabd";
   password "";
   schema "gridlabd";
   port 3306;
   tz_offset 0;
   clientflags LOCAL_FILES;
}

class test {
	double x[h];
}

object test:..2 {
	object player {
		table `test_player`;
		property x[min];
	};
}

#endif
