########################################################
# BEGIN
########################################################

clock {
	timestamp '2000-01-01 0:00:00';
}

########################################################
# modules
module network {
	acceleration_factor 1.0;
	convergence_limit 0.0001;
}

########################################################
# IEEE 14 Bus Test
#

import network ../externals/ieee14bus.cdf;
