////////////////////////////////////////////////////////////////////////////////////////////////////////////////
// BEGIN
////////////////////////////////////////////////////////////////////////////////////////////////////////////////

#set savefile="pnnl300bus.xml"
#set iteration_limit=10000

clock {
	timestamp '2000-01-01 0:00:00';
}

////////////////////////////////////////////////////////////////////////////////////////////////////////////////
// modules
module tape;
module network {
	acceleration_factor 1.4;
	convergence_limit 0.5;
}

////////////////////////////////////////////////////////////////////////////////////////////////////////////////
// IEEE 300 Bus Test
//

import network pnnl300bus.cdf;

#ifdef TAPE
module tape;
object player {
	file ${TAPE};
	loop 50000;
}
#endif
