// $Id: namespace.glm 4738 2014-07-03 00:55:39Z dchassin $
// Copyright (C) 2008 Battelle Memorial Institute
//
// This can be used as an example and a test of namespaces
//

#setenv path=c:\mingw\bin
#set include="c:\projects\gridlab-d\core"
#set savefile="namespace.xml"
#set debugger=1
#set debug=1

class mytest {

	char1024 test;

	intrinsic create(object parent)
	{
		return SUCCESS;
	};

	intrinsic init(object parent)
	{
		return SUCCESS;
	};

	intrinsic sync(timestamp t0, timestamp t1)
	{
		return TS_NEVER;
	};

};

namespace space1 {
	object mytest {
		name test1;
	};
}

namespace space2 {
	object mytest {
		namespace space1 {
			object mytest {
				test `{namespace} {class} {id}`;
			};
		};
	};
}
