// $Id: residential_1home.glm 4738 2014-07-03 00:55:39Z dchassin $
// Copyright (C) 2008 Battelle Memorial Institute

clock {
	timestamp '2000-01-01 0:00:00';
	timezone PST+8PDT;
}

module tape;
module climate;
module residential;

#include "CA-Los_angeles.glm"


object house:1 {
	floor_area random.normal(1500,300) sf;
	heating_setpoint 70.0 degF;
	cooling_setpoint 76.0 degF;
	thermostat_deadband 1.0 degF;

}

object lights:2 {
	parent house:1;
}

object range:3 {
	parent house:1;
}

object clotheswasher:4 {
	parent house:1;
}

object waterheater:5 {
	parent house:1;
	tank_setpoint 135.0 degF;
}

object microwave:6 {
	parent house:1;
}

object plugload:7 {
	parent house:1;
}

object dishwasher:8 {
	parent house:1;
}

object player{
	parent lights:2;
	property demand;
	file lightingDemand.glt;
	loop 100;
}

object player{
	parent range:3;
	property demand;
	file rangeDemand.glt;
	loop 100;
}

object player{
	parent clotheswasher:4;
	property enduse_queue;
	file clotheswasherDemand.glt;
	loop 100;
}

object player{
	parent waterheater:5;
	property water_demand;
	file hotwaterDemand.glt;
	loop 100;
}

object player:20 {
	parent microwave:6;
	property demand;
	file microwaveDemand.glt;
	loop 100;
}

object player:21 {
	parent plugload:7;
	property demand;
	file plugloadDemand.glt;
	loop 100;
}

object player:22 {
	parent dishwasher:8;
	property demand;
	file dishwasherDemand.glt;
	loop 100;
}

object occupantload:9{
	parent house:1;
	number_of_occupants 4;
}

object player:23 {
	parent occupantload:9;
	property occupancy_fraction;
	file occupancyFraction.glt;
	loop 100;
}

object recorder{
	parent house:*;
	property enduse_load;
	file kgrecorder.txt;
	interval 0;
	limit 1000;
	}
