// $Id: plc_test_1.glm 4738 2014-07-03 00:55:39Z dchassin $
//	Copyright (C) 2008 Battelle Memorial Institute

clock {
	timestamp '2000-01-01 0:00:00';
	timezone PST+8PDT;
}


module plc {
	incpath "..\rt\include";
	libpath "..\rt\lib";
}

object comm {
	name net;
	latency pareto(1,3);
	reliability 0.99;
	bitrate 1.5 Mb/s;
	timeout 10 s;
}

object plc {
	name from;
	parent net;
	network net;
	source from.plc;
}

object plc {
	name to;
	parent net;
	network net;
	source to.plc;
}
