clock {
    timezone PST+8PDT;
    starttime '2020-01-01 00:00:00';
    stoptime '2020-01-01 01:00:00';
}
module powerflow;
object substation {
    name network_node;
    bustype SWING;
    phases ABCN;
    nominal_voltage 140000;
    base_power 12MVA;
    positive_sequence_voltage 140000;
}
