// Test for clotheswasher energy usage during a weekend in the winter
// TEST WILL FAIL UNTIL CLOTHESWASHER IS PROPERLY LINKED UP TO ENDUSE_LOAD; MAY NEED TO BE EDITED AFTERWARDS
//
// payroll: d3y332

#set suppress_repeat_messages=1

clock {
	timezone PST+8PDT;
	starttime '2001-01-01 00:00:00 PDT';
	stoptime '2001-01-02 01:00:00 PDT';
}


schedule washing {

		weekday-summer {
		*  0 * 4-9 1-5 0.0029; *  1 * 4-9 1-5 0.0019; *  2 * 4-9 1-5 0.0014; *  3 * 4-9 1-5 0.0013;
		*  4 * 4-9 1-5 0.0018; *  5 * 4-9 1-5 0.0026; *  6 * 4-9 1-5 0.0055; *  7 * 4-9 1-5 0.0126;
		*  8 * 4-9 1-5 0.0181; *  9 * 4-9 1-5 0.0208; * 10 * 4-9 1-5 0.0229; * 11 * 4-9 1-5 0.0216;
		* 12 * 4-9 1-5 0.0193; * 13 * 4-9 1-5 0.0170; * 14 * 4-9 1-5 0.0145; * 15 * 4-9 1-5 0.0135;
		* 16 * 4-9 1-5 0.0135; * 17 * 4-9 1-5 0.0142; * 18 * 4-9 1-5 0.0145; * 19 * 4-9 1-5 0.0148;
		* 20 * 4-9 1-5 0.0146; * 21 * 4-9 1-5 0.0141; * 22 * 4-9 1-5 0.0110; * 23 * 4-9 1-5 0.0062;
		}
		weekend-summer {
		*  0 * 4-9 6-0 0.0031; *  1 * 4-9 6-0 0.0019; *  2 * 4-9 6-0 0.0013; *  3 * 4-9 6-0 0.0012;
		*  4 * 4-9 6-0 0.0012; *  5 * 4-9 6-0 0.0016; *  6 * 4-9 6-0 0.0027; *  7 * 4-9 6-0 0.0066;
		*  8 * 4-9 6-0 0.0157; *  9 * 4-9 6-0 0.0220; * 10 * 4-9 6-0 0.0258; * 11 * 4-9 6-0 0.0251;
		* 12 * 4-9 6-0 0.0231; * 13 * 4-9 6-0 0.0217; * 14 * 4-9 6-0 0.0186; * 15 * 4-9 6-0 0.0157;
		* 16 * 4-9 6-0 0.0156; * 17 * 4-9 6-0 0.0151; * 18 * 4-9 6-0 0.0147; * 19 * 4-9 6-0 0.0150;
		* 20 * 4-9 6-0 0.0156; * 21 * 4-9 6-0 0.0148; * 22 * 4-9 6-0 0.0106; * 23 * 4-9 6-0 0.0065;
		}
		weekday-winter {
		*  0 * 10-3 1-5 0.0036; *  1 * 10-3 1-5 0.0024; *  2 * 10-3 1-5 0.0020; *  3 * 10-3 1-5 0.0019;
		*  4 * 10-3 1-5 0.0026; *  5 * 10-3 1-5 0.0040; *  6 * 10-3 1-5 0.0062; *  7 * 10-3 1-5 0.0118;
		*  8 * 10-3 1-5 0.0177; *  9 * 10-3 1-5 0.0211; * 10 * 10-3 1-5 0.0215; * 11 * 10-3 1-5 0.0203;
		* 12 * 10-3 1-5 0.0176; * 13 * 10-3 1-5 0.0155; * 14 * 10-3 1-5 0.0133; * 15 * 10-3 1-5 0.0130;
		* 16 * 10-3 1-5 0.0145; * 17 * 10-3 1-5 0.0159; * 18 * 10-3 1-5 0.0166; * 19 * 10-3 1-5 0.0164;
		* 20 * 10-3 1-5 0.0154; * 21 * 10-3 1-5 0.0149; * 22 * 10-3 1-5 0.0110; * 23 * 10-3 1-5 0.0065;
		}
		weekend-winter {
		*  0 * 10-3 6-0 0.0044; *  1 * 10-3 6-0 0.0030; *  2 * 10-3 6-0 0.0022; *  3 * 10-3 6-0 0.0020;
		*  4 * 10-3 6-0 0.0021; *  5 * 10-3 6-0 0.0021; *  6 * 10-3 6-0 0.0030; *  7 * 10-3 6-0 0.0067;
		*  8 * 10-3 6-0 0.0145; *  9 * 10-3 6-0 0.0244; * 10 * 10-3 6-0 0.0310; * 11 * 10-3 6-0 0.0323;
		* 12 * 10-3 6-0 0.0308; * 13 * 10-3 6-0 0.0285; * 14 * 10-3 6-0 0.0251; * 15 * 10-3 6-0 0.0224;
		* 16 * 10-3 6-0 0.0215; * 17 * 10-3 6-0 0.0203; * 18 * 10-3 6-0 0.0194; * 19 * 10-3 6-0 0.0188;
		* 20 * 10-3 6-0 0.0180; * 21 * 10-3 6-0 0.0151; * 22 * 10-3 6-0 0.0122; * 23 * 10-3 6-0 0.0073;
		}
}

module residential;
module assert;
module tape;

object house {
	heating_setpoint 5;
	cooling_setpoint 300;
	air_temperature 70;
	outdoor_temperature 73;
	object clotheswasher {
		motor_power 1000W;
		shape "type: pulsed; schedule: washing; energy: 1 kWh; count: 4; power: 1 kW; stdev: 0.15 kW";

		//Weekend winter test
		//WARNING: This test may be off by 1 hour. Please adjust accordingly.
		object complex_assert {
			target "energy";
			within .01;
			in '2001-01-01 23:59:59 PDT';
			value 4;
		};
		object recorder {
			property enduse_load,energy;
			file "test_dryer_external_power.csv";
			interval 1800;
			limit 53;
		};

	};

}
