//Purpose: Incandescent bulbs have a 1.00 power factor. This means the load should basically be the demand * the total installed
//power. The demand goes from 0 to .1, .25, .5, 1, and back to 0. These are in 4 hour increments. These were both hand calculated
//and tested using the lights_power.m file.
//
//Note: Last hand check passed 07/14/2009
//Payroll: D3P706

clock {
	timestamp '2000-01-01 0:00:00';
	stoptime '2000-01-01 24:00:00';
	timezone PST+8PDT;
}

module tape;
module residential;
module assert;

object house:1 {
	floor_area random.normal(1500,300) sf;
	heating_setpoint 10;
	cooling_setpoint 150;
	air_temperature 74;
	mass_temperature 74;
	thermostat_deadband 2;
}

object lights:2 {
	parent house:1;
	type INCANDESCENT;
	installed_power 1000 W;
	object complex_assert {
		target "enduse_load";
		within .01;
		object player {
			property value;
			file "../test_lights_incandescent_range.player";
		};
	};
	object recorder{
		property enduse_load,internal_gains;
		file "test_lights_incandescent_range.csv";
		interval 3600;
		limit 100;
	};
}

object player{
	parent lights:2;
	property demand;
	file "../generic_fail_demand(range0-1).glt";
	loop 1;
}
