// $Id: test_lights_standalone.glm 4738 2014-07-03 00:55:39Z dchassin $
// Test standalone lighting objects
//

clock {
	timezone PST+8PDT;
	starttime '2001-01-01 00:00:00 PST';
	stoptime '2002-01-01 01:00:00 PST';
}

schedule lighting {
	* 17-22 * 12-2 * 0.75 // winter
	* 18-22 * 3-5,9-11 * 0.5 // spring/fall
	* 19-22 * 6-8 * 0.25 // summer
}

module residential;
module assert;
module tape;

// Test 1
// Verify that the values given in the schedule are directly copied
// to the enduse and that they accrue properly to the metered energy
object lights {
	name "direct-power";
	power_fraction 1.0;
	type CFL; // -> PF = -0.92
	power_factor -0.92;
	shape "type: analog; schedule: lighting";
	object complex_assert {
		in '2002-01-01 00:00:00 PST';
		target energy;
		within 1;
		value +954.5-406.6j;
	};
}

// Test 2
// Verify that the values given in the schedule are scaled from installed_power
// to the enduse and that they accrue properly to the metered energy
object lights {
	name "installed-power";
	installed_power 500 W;
	power_fraction 1.0;
	type CFL; // -> PF = -0.92
	power_factor -0.92;
	shape "type: analog; schedule: lighting";
	object complex_assert {
		in '2002-01-01 00:00:00 PST';
		target energy;
		within 1;
		value +477.3-203.3j;
	};
}

// Test 3
// Verify that the values given in the schedule are scaled from the loadshape
// to the enduse and that they accrue properly to the metered energy
object lights {
	name "scaled-power";
	type CFL; // -> PF = -0.92
	power_factor -0.92;
	power_fraction 1.0;
	shape "type: analog; schedule: lighting; power: 500 W";
	object complex_assert {
		in '2002-01-01 00:00:00 PST';
		target energy;
		within 1;
		value +477.3-203.3j;
	};
}

object multi_recorder {
	parent direct-power;
	property energy,installed-power:energy,scaled-power:energy;
	file test_lights_standalone.csv;
	interval 3600;
	limit 8760;
}
