//Microwave Energy Accumulation
//test_microwave_energy_accumulation.glm
//The purpose of this simulation is to make sure the energy is accumulating when the demand it set to zero


clock {
	timezone PST+8PDT;
	starttime '2000-01-01 0:00:00';
	stoptime '2000-01-01 0:00:10';
}

module tape;
module residential;
module assert;

object house:1 {
}

object microwave:2 {
	parent house:1;
	installed_power 1000 W;
	standby_power 200 W;
	cycle_length 600;
}

object recorder:3 {
	parent microwave:2;
	property constant_power,energy;
	file "test_microwave_energy_accumulation.csv";
	interval 1;
	limit 10;
}

object complex_assert:4 {
	parent microwave:2;
	target energy;
	within 0.02;
	object player {
		property value;
		file "../test_microwave_energy_accumulation.player";
	};
}
