//test_microwave_explicit_swy.glm

//this program contains one house with a single microwave using the explicit schedule and the hvac turned off
//this program will validate power through energy usage as well as energy.
//by d3y334

module assert;
module tape;
module residential {
	implicit_enduses MICROWAVE;
}

clock {
	timestamp '2001-05-01 0:00:00';
	stoptime '2001-05-02 2:00:00';
	timezone PST+8PDT;
}

schedule micro {//copied straight from houe_e.cpp
	weekday-summer {
		*  0 * 4-9 1-5 0.009; *  1 * 4-9 1-5 0.008; *  2 * 4-9 1-5 0.007; *  3 * 4-9 1-5 0.007;
		*  4 * 4-9 1-5 0.008; *  5 * 4-9 1-5 0.012; *  6 * 4-9 1-5 0.025; *  7 * 4-9 1-5 0.040;
		*  8 * 4-9 1-5 0.044; *  9 * 4-9 1-5 0.042; * 10 * 4-9 1-5 0.042; * 11 * 4-9 1-5 0.053;
		* 12 * 4-9 1-5 0.057; * 13 * 4-9 1-5 0.046; * 14 * 4-9 1-5 0.044; * 15 * 4-9 1-5 0.053;
		* 16 * 4-9 1-5 0.094; * 17 * 4-9 1-5 0.168; * 18 * 4-9 1-5 0.148; * 19 * 4-9 1-5 0.086;
		* 20 * 4-9 1-5 0.053; * 21 * 4-9 1-5 0.038; * 22 * 4-9 1-5 0.023; * 23 * 4-9 1-5 0.013;
	}
	weekend-summer {
		*  0 * 4-9 6-0 0.009; *  1 * 4-9 6-0 0.007; *  2 * 4-9 6-0 0.007; *  3 * 4-9 6-0 0.007;
		*  4 * 4-9 6-0 0.007; *  5 * 4-9 6-0 0.009; *  6 * 4-9 6-0 0.017; *  7 * 4-9 6-0 0.038;
		*  8 * 4-9 6-0 0.060; *  9 * 4-9 6-0 0.068; * 10 * 4-9 6-0 0.065; * 11 * 4-9 6-0 0.067;
		* 12 * 4-9 6-0 0.076; * 13 * 4-9 6-0 0.066; * 14 * 4-9 6-0 0.061; * 15 * 4-9 6-0 0.067;
		* 16 * 4-9 6-0 0.091; * 17 * 4-9 6-0 0.134; * 18 * 4-9 6-0 0.121; * 19 * 4-9 6-0 0.080;
		* 20 * 4-9 6-0 0.052; * 21 * 4-9 6-0 0.035; * 22 * 4-9 6-0 0.022; * 23 * 4-9 6-0 0.011;
	}
	weekday-winter {
		*  0 * 10-3 1-5 0.010; *  1 * 10-3 1-5 0.009; *  2 * 10-3 1-5 0.009; *  3 * 10-3 1-5 0.009;
		*  4 * 10-3 1-5 0.009; *  5 * 10-3 1-5 0.016; *  6 * 10-3 1-5 0.032; *  7 * 10-3 1-5 0.050;
		*  8 * 10-3 1-5 0.045; *  9 * 10-3 1-5 0.043; * 10 * 10-3 1-5 0.045; * 11 * 10-3 1-5 0.059;
		* 12 * 10-3 1-5 0.063; * 13 * 10-3 1-5 0.053; * 14 * 10-3 1-5 0.052; * 15 * 10-3 1-5 0.072;
		* 16 * 10-3 1-5 0.138; * 17 * 10-3 1-5 0.242; * 18 * 10-3 1-5 0.182; * 19 * 10-3 1-5 0.088;
		* 20 * 10-3 1-5 0.051; * 21 * 10-3 1-5 0.034; * 22 * 10-3 1-5 0.022; * 23 * 10-3 1-5 0.014;
	}
	weekend-winter {
		*  0 * 10-3 6-0 0.013; *  1 * 10-3 6-0 0.010; *  2 * 10-3 6-0 0.010; *  3 * 10-3 6-0 0.010;
		*  4 * 10-3 6-0 0.010; *  5 * 10-3 6-0 0.012; *  6 * 10-3 6-0 0.018; *  7 * 10-3 6-0 0.040;
		*  8 * 10-3 6-0 0.073; *  9 * 10-3 6-0 0.094; * 10 * 10-3 6-0 0.091; * 11 * 10-3 6-0 0.100;
		* 12 * 10-3 6-0 0.117; * 13 * 10-3 6-0 0.109; * 14 * 10-3 6-0 0.100; * 15 * 10-3 6-0 0.108;
		* 16 * 10-3 6-0 0.153; * 17 * 10-3 6-0 0.215; * 18 * 10-3 6-0 0.161; * 19 * 10-3 6-0 0.085;
		* 20 * 10-3 6-0 0.050; * 21 * 10-3 6-0 0.033; * 22 * 10-3 6-0 0.022; * 23 * 10-3 6-0 0.014;
	}
}

object house {
	heating_setpoint 5;
	cooling_setpoint 300;
	air_temperature 70;
	outdoor_temperature 73;
	object microwave {
		heatgain_fraction .8;
		power_factor .7;
		shape "type:pulsed; schedule: micro; energy: 1.0 kWh; power: 0.2 kW; count: 1; stdev: 40 W";
		object complex_assert {
			in '2001-05-02 1:00:00';
			once ONCE_TRUE;
			target "energy";
			value 1.0+1.020204j;
			within .01;//1 percet error
		};
		object recorder {
			property energy;
			file "test_microwave_explicit_swy.csv";
			interval 3600;
			limit 24;
		};
	};
}
