//Power limits Test
//test_microwave_standby_power_limits.glm
//This is a test to see that the auto-correction works correctly for standby_power.
//The default value for standby_power is 1% of installed_power
clock {
	starttime '2000-01-01 00:00:00';
	stoptime '2001-01-01 00:00:00';
	timezone PST+8PDT;
}

module tape;
module residential;
module assert;

object house:1 {
}

object microwave:2 {
	parent house:1;
	installed_power 1000 W;
	standby_power -100 W;
}

object recorder:3 {
	parent microwave:2;
	property standby_power,installed_power,cycle_length,constant_power,constant_current;
	file "test_microwave_standby_power_limits.csv";
	interval 1;
	limit 10;
}

object double_assert:4 {
	parent microwave:2;
	status ASSERT_TRUE;
	target "standby_power";
	within 0.001;
	object player {
		property value;
		file "../test_microwave_standby_power_limits.player";//standby_power should = 10 W
	};
}

//created by d3y334
