//
// Test purpose: valdating enduse_load variable under normal(0-1) demand
// values for plugload over a 24hr period. Correct values were obtained from
// a working version of plugload based on following the hourly enduse load
// equation:
//	enduse_load = demand*constant_power
clock {
	timestamp '2000-01-01 0:00:00';
	stoptime '2000-01-01 24:00:00';
	timezone PST+8PDT;
}

module tape;
module residential;
module assert;


object house {
	floor_area 1500 sf;
	cooling_setpoint 100; // turns of HVAC
	heating_setpoint 1;
	object plugload {
		installed_power 100 W;
		object player {
			file ../generic_demand.glt;
			loop 24;
			property demand;
		};
//		object complex_assert {
//			target "enduse_load";
//			within 0.000001;
//			object player {
//				property value;
//				file ../plugload_enduse_load.player;
//			};
//		};
		object recorder {
			file "plugload_load_usage3600.csv";
			interval 3600;
			limit 24;
			property demand,enduse_load,power,total;
		};
	};
}
