//
// Test purpose: valdating energy_meter property of plugload under normal operating
// conditions over a 24hr period with varying demand. This test compares the values recorded
// into the plugload energy_meter every hour to a player with the expected hourly values for the
// energy_meter. Expected values were calculated using with a working version of energy_meter
// using the following equation:
//	energy_meter(of hour #h)=energy_meter(of all previous hours) + enduse_load(of hour #h)

clock {
	timestamp '2000-01-01 0:00:00';
	stoptime '2000-01-02 02:00:00';
	timezone PST+8PDT;
}

module tape;
module residential;
module assert;


object house {
	floor_area 1500 sf;
	cooling_setpoint 100; // turns of HVAC
	heating_setpoint 1;
	object plugload {
		//shape "type: analog; schedule: residential-plugs-default; power: 0.1";
		object player {
			file generic_demand.glt;
			loop 100;
			property demand;
		};
		object complex_assert {
			target "energy";
			once ONCE_TRUE;
			within 0.0001;
			object player {
				property value;
				file plugload_energy_meter.player;
			};
		};
		object recorder {
			file "plugload_load_usage3600.csv";
			interval 3600;
			limit 24;
			property load,power,energy_meter;
		};
	};
}
