//test_plugload_implicit_wwd.glm

//This test file test the implicit use of plugloads within house_e.
//This test validates power, energy, and heat gain.

clock {
	timestamp '2000-01-01 0:00:00';
	stoptime '2000-01-02 1:00:00';
	timezone PST+8PDT;
}

module assert;
module tape;
module residential {
	implicit_enduses PLUGS;
}

object house {
	name House;
	heating_setpoint 5;
	cooling_setpoint 300;
	air_temperature 70;
	outdoor_temperature 73;
	object complex_assert {
		once ONCE_TRUE;
		target "panel.enduse_load";
		object player {
			property value;
			file "../test_plugload_enduse_load_wwd.player";
		};
		within 1e-6;
	};
	object complex_assert {
		once ONCE_TRUE;
		target "panel.energy";
		object player {
			property value;
			file "../test_plugload_energy_wwd.player";
		};
		within 1e-6;
	};
	object double_assert {
		once ONCE_TRUE;
		target "panel.heatgain";
		object player {
			property value;
			file "../test_plugload_heatgain_wwd.player";
		};
		within 1e-6;
	};

	object recorder {
		property panel.power,panel.energy,panel.heatgain;
		file "test_plugload_implicit_wwd.csv";
		interval 1800;
		limit 60;
	};
}
