//Purpose: This test checks the range's energy meter over 24 hours. There should be a power factor of 1 with no complex values.
//
//Note: Last hand check passed 07/14/2009
//

clock {
	timestamp '2000-01-01 0:00:00';
	stoptime '2000-01-01 23:59:00';
	timezone PST+8PDT;
}

module tape;
module residential;
module assert;

object house:1 {
	floor_area random.normal(1500,300) sf;
	heating_setpoint 10;
	cooling_setpoint 150;
	air_temperature 74;
	mass_temperature 74;
	thermostat_deadband 2;
}

object range:2 {
	parent house:1;
	installed_power 2000W;
	object complex_assert {
		target "energy_meter";
		within .1;
		once ONCE_TRUE;
		object player {
			property value;
			file "..\test_range_energy.player";
			loop 1;
		};
	};
	object recorder{
		property enduse_load,internal_gains,energy_meter,constant_current;
		file "test_range_energy.csv";
		interval -1;
		limit 100;
	};
}

object player{
	parent range:2;
	property demand;
	file "..\generic_demand.glt";
	loop 1;
}
