// $Id: residential_implicit_all.glm 1182 2008-12-22 22:08:36Z dchassin $
// Copyright (C) 2008 Battelle Memorial Institute

clock {
	timezone EST+5EDT;
	starttime '2010-01-01 0:00:00';
	stoptime '2010-01-02 0:00:00';
}

module tape;
module residential;

#set profiler=1
#set threadcount=2
#set iteration_limit=10
#set verbose=1
#set debug=0

object house:..50 {
	floor_area random.normal(1500,300);
	object recorder {
		property air_temperature;
		file "house${id}.csv";
		interval 3600;
		limit 8760;
	};
}
