clock {
	starttime '2018-01-01 00:00:00';
	stoptime '2019-01-01 00:00:00';
}

class test {
	randomvar x;
	randomvar y;
}

module tape;
object test:..10 {
	x "type:normal(0,1); refresh:1h";
	y "type:normal(0,1); refresh:1h";
}

object collector {
	group class=test;
	property mean(x),std(x),min(x),max(x);
	property mean(y),std(y),min(y),max(y);
	file test_collector_multiple_properties.csv;
	interval 1h;
};
