// Exercise 2.2.2

module tape;
module residential {
	implicit_enduses NONE;
}

clock {
	timezone PST+8PDT;
	starttime '2001-01-01 00:00:00';
	stoptime '2002-01-01 00:00:00';
}

object house {
	object waterheater {
		object recorder {
			property "::clock";
			file "clock.csv";
			interval -1;
			limit 100;
		};
	};
}
