// $Id: commercial_1office.glm 4738 2014-07-03 00:55:39Z dchassin $
//
// commercial single-zone office test
//

clock {
	timestamp '2000-01-01 0:00:00';
	timezone PST+8PDT;
}

module climate;
module commercial;
module tape;

#include "CA-Los_angeles.glm"

object office:1 {
	floor_area random.normal(100000,10000) sf;
	floor_height 10 ft;
	interior_mass random.normal(500000,50000) Btu/degF;
	interior_ua random.normal(75000,7500) Btu/degF/h;
	exterior_ua random.normal(15000,1500) Btu/degF/h;
	hvac.heating.balance_temperature random.normal(60,2) degF;
	hvac.heating.design_temperature random.normal(25,2) degF;
	hvac.cooling.balance_temperature random.normal(70,2) degF;
	hvac.cooling.design_temperature random.normal(100,2) degF;
	air_temperature random.normal(75,1) degF;
	mass_temperature random.normal(75,1) degF;
	glazing.south 5000 sf;
	glazing.east 5000 sf;
	glazing.west 5000 sf;
	glazing.north 5000 sf;
	glazing.coefficient 0.5;
}

object collector {
	group class=office;
	property sum(total_load.real),max(air_temperature,min(air_temperature),avg(air_temperature),max(mass_temperature),min(mass_temperature),avg(mass_temperature);
	interval 3600; // 1 hour
	limit 8760; // ~1 month
	file total_power.csv;
}

object recorder {
	parent office:1;
	property hc_mode,air_temperature,mass_temperature,temperature_change,Qh,Qs,Qi,total_load;
	interval 0;
	file office_1.csv;
}
