////////////////////////////////////////////////////////
// BEGIN
////////////////////////////////////////////////////////

clock {
	timestamp '2000-01-01 0:00:00';
}

////////////////////////////////////////////////////////
// modules
module network {
	acceleration_factor 1.0;
	convergence_limit 0.02;
}

////////////////////////////////////////////////////////
// IEEE 300 Bus Test
//

//NOTE:  This file is not working correctly.  The ieee300bus.cdf file
//       is not in common data format.  If a corrected version is found
//       please replace it.

import network ../externals/ieee300bus.cdf;
