////////////////////////////////////////////////////////////////////////////////////////////////////////////////
// Port Angeles Olypen Test Model
////////////////////////////////////////////////////////////////////////////////////////////////////////////////

clock {
	timestamp '2006-04-01 0:00:00';
	timezone PST+8PDT;
}

////////////////////////////////////////////////////////////////////////////////////////////////////////////////
// modules
module climate;
module tape;
module network;
module commercial;

////////////////////////////////////////////////////////////////////////////////////////////////////////////////
// climate data
object climate:0 {
	latitude 48N0'0";
	longitude 123W30'0";
	city "Port Angeles";
}
//object player:1 {
//	parent climate:0;
//	property temperature;
//	file "kclm.tmy";
//}

////////////////////////////////////////////////////////////////////////////////////////////////////////////////
// grid network
%ifdef use_grid
object node:2 {
	name feeder;
	type 3;
}
object meter:3 {
	type 1;
}
object link:4 {
	from node.name:feeder;
	to meter:3;
	Y 0.1+0.01j;
}
%endif

object office:..10 {
%ifdef use_grid
	parent meter:3;
%endif
	floorarea_sf random.lognormal(10000,100000);
	occupants_psf 0.01;
	occupancy_schedule "0=*;0.1=S:10-16;0.2=MTWRF:6-18;1.0=MTWRF:8-16;0.8=MTWRF:11-13";

	lights.power_density_Wpsf 0.2;
	lights.power_factor 0.95;
	lights.occupancy_load_Wpp 50;
	lights.baseload_pu 0.2;

	plugs.occupancy_load_Wpp 200;
	plugs.baseload_pu 0.5;

	hvac.baseload_pu 0.2;
	hvac.occupancy_load_Wpp 3;
	hvac.power_factor 0.8;
	hvac.thermal_load_WpFpsf 0.1;
}

object office:..100 {
	floorarea_sf random.lognormal(1000,10000);
	occupants_psf random.normal(0.01,0.001);
	occupancy_schedule "0.1=*;0.4=MTWRF:7-19;1.0=MTWRF:9-17;0.9=MTWRF:11-13";

	lights.power_density_Wpsf 0.2;
	lights.power_factor random.normal(0.95,0.01);
	lights.occupancy_load_Wpp 50;
	lights.baseload_pu 0.2;

	plugs.occupancy_load_Wpp 200;
	plugs.power_factor  random.normal(0.9,0.02);
	plugs.baseload_pu 0.5;

	hvac.baseload_pu 0.2;
	hvac.occupancy_load_Wpp 3;
	hvac.power_factor random.normal(0.7,0.1);
	hvac.thermal_load_WpFpsf random.normal(0.5,0.2);

}

object collector {
	group class=office;
	property sum(power_kW.real),sum(power_kW.imag);
	file olypen.csv;
	interval 0;
}

////////////////////////////////////////////////////////////////////////////////////////////////////////////////
// END
////////////////////////////////////////////////////////////////////////////////////////////////////////////////
