// $Id: pnnl14bus.glm 1182 2008-12-22 22:08:36Z dchassin $
// Copyright (C) 2008 Battelle Memorial Institute

clock {
	timestamp '2000-01-01 0:00:00';
}

module network {
	acceleration_factor 1.0;
	convergence_limit 0.001;
}

import network pnnl14bus.cdf;

object generator {
	parent node.type:SWING;
	Pmax_MW 1000;
	Qmax_MVAR 100;
	Qmin_MVAR -100;
}

module tape;
object player {
	file "speed.tape";
	loop 50000;
}
