// $Id: pnnl300bus.glm 1182 2008-12-22 22:08:36Z dchassin $
// Copyright (C) 2008 Battelle Memorial Institute

clock {
	timestamp '2000-01-01 0:00:00';
}

module tape;
module network {
	acceleration_factor 1.0;
	convergence_limit 0.5;
}

import network ieee300bus.cdf;

object player {
	file "speed.tape";
	loop 2000;
}
