// $Id: residential_1home.glm 1182 2008-12-22 22:08:36Z dchassin $
// Copyright (C) 2008 Battelle Memorial Institute

clock {
	timestamp '2000-01-01 0:00:00';
	timezone PST+8PDT;
}

module tape;
module climate;
module residential;

object climate {
	tmyfile ca.los_angeles.23174;
}

object house:1 {
	floor_area random.normal(1500,300) sf;
	heating_setpoint 70.0 degF;
	cooling_setpoint 76.0 degF;
	thermostat_deadband 1.0 degF;

}

object lights:2 {
	parent house:1;
}

object range:3 {
	parent house:1;
}

object clotheswasher:4 {
	parent house:1;
}

object waterheater:5 {
	parent house:1;
	tank_setpoint 135.0 degF;
}

object player{
	parent lights:2;
	property demand;
	file lightingDemand.glt;
	loop 100;
}

object player{
	parent range:3;
	property demand;
	file rangeDemand.glt;
	loop 100;
}

object player{
	parent clotheswasher:4;
	property demand;
	file clotheswasherDemand.glt;
	loop 100;
}

object player{
	parent waterheater:5;
	property demand;
	file hotwaterDemand.glt;
	loop 100;
}

object microwave:6 {
	parent house:1;
}

object plugload:7 {
	parent house:1;
}

object dishwasher:8 {
	parent house:1;
}

object player{
	parent microwave:6;
	property demand;
	file microwaveDemand.glt;
	loop 100;
}

object player{
	parent plugload:7;
	property demand;
	file plugloadDemand.glt;
	loop 100;
}


object player{
	parent dishwasher:8;
	property demand;
	file dishwasherDemand.glt;
	loop 100;
}

object occupantload:9{
	parent house:1;
	number_of_occupants 4;
}

object player{
	parent occupantload:9;
	property occupancy_fraction;
	file occupancyFraction.glt;
	loop 100;
}

object recorder{
	parent house:*;
	property total_internal_gain;
	file kgrecorder.txt;
	interval 0;
	limit 1000;
	}
